// SBML level 3 version 1

model main()
  // model units - substance: item, time: second, extent: item

  // Compartments:
  compartment c1 = 1 litre;

  // Species:
  species nsg in c1 = 0;  // substance in mole
  species N in c1 = 0;  // substance in mole
  species nsg_N20_P20_L20 in c1 = 0;  // substance in mole
  species nsg_N20_P20 in c1 = 0;  // substance in mole
  species nsg_N20 in c1 = 1/c1;  // substance in mole
  species psg in c1 = 0;  // substance in mole
  species psg_N20 in c1 = 0;  // substance in mole
  species L in c1 = 20/c1;  // substance in mole
  species P in c1 = 20/c1;  // substance in mole
  species M in c1 = 0;  // substance in mole
  species G in c1 = 20/c1;  // substance in mole
  species mL in c1 = 0;  // substance in mole
  species mM in c1 = 0;  // substance in mole
  species mP in c1 = 0;  // substance in mole
  species mG in c1 = 0;  // substance in mole
  species mN in c1 = 0;  // substance in mole
  species nsg_N20_P20_L20_M20 in c1 = 0;  // substance in mole
  species nsg_N20_P20_L20_M20_G20 in c1 = 0;  // substance in mole
  species V in c1 = 0;  // substance in mole
  species nsg_N1 in c1 = 0;  // substance in mole
  species nsg_N2 in c1 = 0;  // substance in mole
  species nsg_N3 in c1 = 0;  // substance in mole
  species nsg_N4 in c1 = 0;  // substance in mole
  species nsg_N5 in c1 = 0;  // substance in mole
  species nsg_N6 in c1 = 0;  // substance in mole
  species nsg_N7 in c1 = 0;  // substance in mole
  species nsg_N8 in c1 = 0;  // substance in mole
  species nsg_N9 in c1 = 0;  // substance in mole
  species nsg_N10 in c1 = 0;  // substance in mole
  species nsg_N11 in c1 = 0;  // substance in mole
  species nsg_N12 in c1 = 0;  // substance in mole
  species nsg_N13 in c1 = 0;  // substance in mole
  species nsg_N14 in c1 = 0;  // substance in mole
  species nsg_N15 in c1 = 0;  // substance in mole
  species nsg_N16 in c1 = 0;  // substance in mole
  species nsg_N17 in c1 = 0;  // substance in mole
  species nsg_N18 in c1 = 0;  // substance in mole
  species nsg_N19 in c1 = 0;  // substance in mole
  species psg_N1 in c1 = 0;  // substance in mole
  species psg_N2 in c1 = 0;  // substance in mole
  species psg_N3 in c1 = 0;  // substance in mole
  species psg_N4 in c1 = 0;  // substance in mole
  species psg_N5 in c1 = 0;  // substance in mole
  species psg_N6 in c1 = 0;  // substance in mole
  species psg_N7 in c1 = 0;  // substance in mole
  species psg_N8 in c1 = 0;  // substance in mole
  species psg_N9 in c1 = 0;  // substance in mole
  species psg_N10 in c1 = 0;  // substance in mole
  species psg_N11 in c1 = 0;  // substance in mole
  species psg_N12 in c1 = 0;  // substance in mole
  species psg_N13 in c1 = 0;  // substance in mole
  species psg_N14 in c1 = 0;  // substance in mole
  species psg_N15 in c1 = 0;  // substance in mole
  species psg_N16 in c1 = 0;  // substance in mole
  species psg_N17 in c1 = 0;  // substance in mole
  species psg_N18 in c1 = 0;  // substance in mole
  species psg_N19 in c1 = 0;  // substance in mole
  species nsg_N20_P1 in c1 = 0;  // substance in mole
  species nsg_N20_P2 in c1 = 0;  // substance in mole
  species nsg_N20_P3 in c1 = 0;  // substance in mole
  species nsg_N20_P4 in c1 = 0;  // substance in mole
  species nsg_N20_P5 in c1 = 0;  // substance in mole
  species nsg_N20_P6 in c1 = 0;  // substance in mole
  species nsg_N20_P7 in c1 = 0;  // substance in mole
  species nsg_N20_P8 in c1 = 0;  // substance in mole
  species nsg_N20_P9 in c1 = 0;  // substance in mole
  species nsg_N20_P10 in c1 = 0;  // substance in mole
  species nsg_N20_P11 in c1 = 0;  // substance in mole
  species nsg_N20_P12 in c1 = 0;  // substance in mole
  species nsg_N20_P13 in c1 = 0;  // substance in mole
  species nsg_N20_P14 in c1 = 0;  // substance in mole
  species nsg_N20_P15 in c1 = 0;  // substance in mole
  species nsg_N20_P16 in c1 = 0;  // substance in mole
  species nsg_N20_P17 in c1 = 0;  // substance in mole
  species nsg_N20_P18 in c1 = 0;  // substance in mole
  species nsg_N20_P19 in c1 = 0;  // substance in mole
  species nsg_N20_P20_L1 in c1 = 0;  // substance in mole
  species nsg_N20_P20_L2 in c1 = 0;  // substance in mole
  species nsg_N20_P20_L3 in c1 = 0;  // substance in mole
  species nsg_N20_P20_L4 in c1 = 0;  // substance in mole
  species nsg_N20_P20_L5 in c1 = 0;  // substance in mole
  species nsg_N20_P20_L6 in c1 = 0;  // substance in mole
  species nsg_N20_P20_L7 in c1 = 0;  // substance in mole
  species nsg_N20_P20_L8 in c1 = 0;  // substance in mole
  species nsg_N20_P20_L9 in c1 = 0;  // substance in mole
  species nsg_N20_P20_L10 in c1 = 0;  // substance in mole
  species nsg_N20_P20_L11 in c1 = 0;  // substance in mole
  species nsg_N20_P20_L12 in c1 = 0;  // substance in mole
  species nsg_N20_P20_L13 in c1 = 0;  // substance in mole
  species nsg_N20_P20_L14 in c1 = 0;  // substance in mole
  species nsg_N20_P20_L15 in c1 = 0;  // substance in mole
  species nsg_N20_P20_L16 in c1 = 0;  // substance in mole
  species nsg_N20_P20_L17 in c1 = 0;  // substance in mole
  species nsg_N20_P20_L18 in c1 = 0;  // substance in mole
  species nsg_N20_P20_L19 in c1 = 0;  // substance in mole
  species nsg_N20_P20_L20_M1 in c1 = 0;  // substance in mole
  species nsg_N20_P20_L20_M2 in c1 = 0;  // substance in mole
  species nsg_N20_P20_L20_M3 in c1 = 0;  // substance in mole
  species nsg_N20_P20_L20_M4 in c1 = 0;  // substance in mole
  species nsg_N20_P20_L20_M5 in c1 = 0;  // substance in mole
  species nsg_N20_P20_L20_M6 in c1 = 0;  // substance in mole
  species nsg_N20_P20_L20_M7 in c1 = 0;  // substance in mole
  species nsg_N20_P20_L20_M8 in c1 = 0;  // substance in mole
  species nsg_N20_P20_L20_M9 in c1 = 0;  // substance in mole
  species nsg_N20_P20_L20_M10 in c1 = 0;  // substance in mole
  species nsg_N20_P20_L20_M11 in c1 = 0;  // substance in mole
  species nsg_N20_P20_L20_M12 in c1 = 0;  // substance in mole
  species nsg_N20_P20_L20_M13 in c1 = 0;  // substance in mole
  species nsg_N20_P20_L20_M14 in c1 = 0;  // substance in mole
  species nsg_N20_P20_L20_M15 in c1 = 0;  // substance in mole
  species nsg_N20_P20_L20_M16 in c1 = 0;  // substance in mole
  species nsg_N20_P20_L20_M17 in c1 = 0;  // substance in mole
  species nsg_N20_P20_L20_M18 in c1 = 0;  // substance in mole
  species nsg_N20_P20_L20_M19 in c1 = 0;  // substance in mole
  species nsg_N20_P20_L20_M20_G1 in c1 = 0;  // substance in mole
  species nsg_N20_P20_L20_M20_G2 in c1 = 0;  // substance in mole
  species nsg_N20_P20_L20_M20_G3 in c1 = 0;  // substance in mole
  species nsg_N20_P20_L20_M20_G4 in c1 = 0;  // substance in mole
  species nsg_N20_P20_L20_M20_G5 in c1 = 0;  // substance in mole
  species nsg_N20_P20_L20_M20_G6 in c1 = 0;  // substance in mole
  species nsg_N20_P20_L20_M20_G7 in c1 = 0;  // substance in mole
  species nsg_N20_P20_L20_M20_G8 in c1 = 0;  // substance in mole
  species nsg_N20_P20_L20_M20_G9 in c1 = 0;  // substance in mole
  species nsg_N20_P20_L20_M20_G10 in c1 = 0;  // substance in mole
  species nsg_N20_P20_L20_M20_G11 in c1 = 0;  // substance in mole
  species nsg_N20_P20_L20_M20_G12 in c1 = 0;  // substance in mole
  species nsg_N20_P20_L20_M20_G13 in c1 = 0;  // substance in mole
  species nsg_N20_P20_L20_M20_G14 in c1 = 0;  // substance in mole
  species nsg_N20_P20_L20_M20_G15 in c1 = 0;  // substance in mole
  species nsg_N20_P20_L20_M20_G16 in c1 = 0;  // substance in mole
  species nsg_N20_P20_L20_M20_G17 in c1 = 0;  // substance in mole
  species nsg_N20_P20_L20_M20_G18 in c1 = 0;  // substance in mole
  species nsg_N20_P20_L20_M20_G19 in c1 = 0;  // substance in mole

  // Parameters:
  k0 = 0.0755 per_second;
  k1 = 2.78219e-8 per_second;
  k2 = 0.0755 per_second;
  k3 = 3.00429e-9 per_second;
  k4 = 0.0755 per_second;
  k5 = 8.21468e-8 per_second;
  k6 = 0.0755 per_second;
  k7 = 4.73029e-8 per_second;
  k8 = 0.0755 per_second;
  k9 = 5.5e-7 per_second;
  k10 = 0.00019 per_second;
  k11 = 0.00019 per_second;
  k12 = 0.00019 per_second;
  k13 = 0.00019 per_second;
  k14 = 0.00019 per_second;
  k15 = 0.0461 per_second;
  k16 = 0.0461 per_second;
  k17 = 0 per_second;
  k18 = 0.00160781533 per_second;
  k19 = 0.001125471 per_second;
  k20 = 0.0007878297 per_second;
  k21 = 0.000551481 per_second;
  k22 = 5.51481e-5 per_second;
  k23 = 1.9e-5 per_second;
  k24 = 0.0461 per_second;
  k25 = 0 per_second;
  k26 = 0.00160781533 per_second;
  k27 = 0.001125471 per_second;
  k28 = 0.0007878297 per_second;
  k29 = 0.000551481 per_second;
  k30 = 5.51481e-5 per_second;
  k31 = 1.9e-5 per_second;
  k32 = 0.0461 per_second;
  k33 = 0 per_second;
  k34 = 0.00160781533 per_second;
  k35 = 0.001125471 per_second;
  k36 = 0.0007878297 per_second;
  k37 = 0.000551481 per_second;
  k38 = 5.51481e-5 per_second;
  k39 = 1.9e-5 per_second;
  k40 = 0.0461 per_second;
  k41 = 0 per_second;
  k42 = 0.00160781533 per_second;
  k43 = 0.001125471 per_second;
  k44 = 0.0007878297 per_second;
  k45 = 0.000551481 per_second;
  k46 = 5.51481e-5 per_second;
  k47 = 1.9e-5 per_second;
  k48 = 0.0461 per_second;
  k49 = 0 per_second;
  k50 = 0.00160781533 per_second;
  k51 = 0.001125471 per_second;
  k52 = 0.0007878297 per_second;
  k53 = 0.000551481 per_second;
  k54 = 5.51481e-5 per_second;
  k55 = 1.9e-5 per_second;
  k56 = 0.0461 per_second;
  k57 = 0 per_second;
  k58 = 0.00160781533 per_second;
  k59 = 0.001125471 per_second;
  k60 = 0.0007878297 per_second;
  k61 = 0.000551481 per_second;
  k62 = 5.51481e-5 per_second;
  k63 = 1.9e-5 per_second;
  k64 = 0.0461 per_second;
  k65 = 0 per_second;
  k66 = 0.00160781533 per_second;
  k67 = 0.001125471 per_second;
  k68 = 0.0007878297 per_second;
  k69 = 0.000551481 per_second;
  k70 = 5.51481e-5 per_second;
  k71 = 1.9e-5 per_second;
  k72 = 0.0461 per_second;
  k73 = 0 per_second;
  k74 = 0.00160781533 per_second;
  k75 = 0.001125471 per_second;
  k76 = 0.0007878297 per_second;
  k77 = 0.000551481 per_second;
  k78 = 5.51481e-5 per_second;
  k79 = 1.9e-5 per_second;
  k80 = 0.0461 per_second;
  k81 = 0 per_second;
  k82 = 0.00160781533 per_second;
  k83 = 0.001125471 per_second;
  k84 = 0.0007878297 per_second;
  k85 = 0.000551481 per_second;
  k86 = 5.51481e-5 per_second;
  k87 = 1.9e-5 per_second;
  k88 = 0.0461 per_second;
  k89 = 0 per_second;
  k90 = 0.00160781533 per_second;
  k91 = 0.001125471 per_second;
  k92 = 0.0007878297 per_second;
  k93 = 0.000551481 per_second;
  k94 = 5.51481e-5 per_second;
  k95 = 1.9e-5 per_second;
  k96 = 0.0461 per_second;
  k97 = 0 per_second;
  k98 = 0.00160781533 per_second;
  k99 = 0.001125471 per_second;
  k100 = 0.0007878297 per_second;
  k101 = 0.000551481 per_second;
  k102 = 5.51481e-5 per_second;
  k103 = 1.9e-5 per_second;
  k104 = 0.0461 per_second;
  k105 = 0 per_second;
  k106 = 0.00160781533 per_second;
  k107 = 0.001125471 per_second;
  k108 = 0.0007878297 per_second;
  k109 = 0.000551481 per_second;
  k110 = 5.51481e-5 per_second;
  k111 = 1.9e-5 per_second;
  k112 = 0.0461 per_second;
  k113 = 0 per_second;
  k114 = 0.00160781533 per_second;
  k115 = 0.001125471 per_second;
  k116 = 0.0007878297 per_second;
  k117 = 0.000551481 per_second;
  k118 = 5.51481e-5 per_second;
  k119 = 1.9e-5 per_second;
  k120 = 0.0461 per_second;
  k121 = 0 per_second;
  k122 = 0.00160781533 per_second;
  k123 = 0.001125471 per_second;
  k124 = 0.0007878297 per_second;
  k125 = 0.000551481 per_second;
  k126 = 5.51481e-5 per_second;
  k127 = 1.9e-5 per_second;
  k128 = 0.0461 per_second;
  k129 = 0 per_second;
  k130 = 0.00160781533 per_second;
  k131 = 0.001125471 per_second;
  k132 = 0.0007878297 per_second;
  k133 = 0.000551481 per_second;
  k134 = 5.51481e-5 per_second;
  k135 = 1.9e-5 per_second;
  k136 = 0.0461 per_second;
  k137 = 0 per_second;
  k138 = 0.00160781533 per_second;
  k139 = 0.001125471 per_second;
  k140 = 0.0007878297 per_second;
  k141 = 0.000551481 per_second;
  k142 = 5.51481e-5 per_second;
  k143 = 1.9e-5 per_second;
  k144 = 0.0461 per_second;
  k145 = 0 per_second;
  k146 = 0.00160781533 per_second;
  k147 = 0.001125471 per_second;
  k148 = 0.0007878297 per_second;
  k149 = 0.000551481 per_second;
  k150 = 5.51481e-5 per_second;
  k151 = 1.9e-5 per_second;
  k152 = 0.0461 per_second;
  k153 = 0 per_second;
  k154 = 0.00160781533 per_second;
  k155 = 0.001125471 per_second;
  k156 = 0.0007878297 per_second;
  k157 = 0.000551481 per_second;
  k158 = 5.51481e-5 per_second;
  k159 = 1.9e-5 per_second;
  k160 = 0.0461 per_second;
  k161 = 0 per_second;
  k162 = 0.00160781533 per_second;
  k163 = 0.001125471 per_second;
  k164 = 0.0007878297 per_second;
  k165 = 0.000551481 per_second;
  k166 = 5.51481e-5 per_second;
  k167 = 1.9e-5 per_second;
  k168 = 0.0461 per_second;
  k169 = 0 per_second;
  k170 = 0.00160781533 per_second;
  k171 = 0.001125471 per_second;
  k172 = 0.0007878297 per_second;
  k173 = 0.000551481 per_second;
  k174 = 5.51481e-5 per_second;
  k175 = 1.9e-5 per_second;
  k176 = 0.0461 per_second;
  k177 = 0 per_second;
  k178 = 1.9e-5 per_second;
  k179 = 0.0461 per_second;
  k180 = 0 per_second;
  k181 = 1.9e-5 per_second;
  k182 = 0.0461 per_second;
  k183 = 0 per_second;
  k184 = 1.9e-5 per_second;
  k185 = 0.0461 per_second;
  k186 = 0 per_second;
  k187 = 1.9e-5 per_second;
  k188 = 0.0461 per_second;
  k189 = 0 per_second;
  k190 = 1.9e-5 per_second;
  k191 = 0.0461 per_second;
  k192 = 0 per_second;
  k193 = 1.9e-5 per_second;
  k194 = 0.0461 per_second;
  k195 = 0 per_second;
  k196 = 1.9e-5 per_second;
  k197 = 0.0461 per_second;
  k198 = 0 per_second;
  k199 = 1.9e-5 per_second;
  k200 = 0.0461 per_second;
  k201 = 0 per_second;
  k202 = 1.9e-5 per_second;
  k203 = 0.0461 per_second;
  k204 = 0 per_second;
  k205 = 1.9e-5 per_second;
  k206 = 0.0461 per_second;
  k207 = 0 per_second;
  k208 = 1.9e-5 per_second;
  k209 = 0.0461 per_second;
  k210 = 0 per_second;
  k211 = 1.9e-5 per_second;
  k212 = 0.0461 per_second;
  k213 = 0 per_second;
  k214 = 1.9e-5 per_second;
  k215 = 0.0461 per_second;
  k216 = 0 per_second;
  k217 = 1.9e-5 per_second;
  k218 = 0.0461 per_second;
  k219 = 0 per_second;
  k220 = 1.9e-5 per_second;
  k221 = 0.0461 per_second;
  k222 = 0 per_second;
  k223 = 1.9e-5 per_second;
  k224 = 0.0461 per_second;
  k225 = 0 per_second;
  k226 = 1.9e-5 per_second;
  k227 = 0.0461 per_second;
  k228 = 0 per_second;
  k229 = 1.9e-5 per_second;
  k230 = 0.0461 per_second;
  k231 = 0 per_second;
  k232 = 1.9e-5 per_second;
  k233 = 0.0461 per_second;
  k234 = 0 per_second;
  k235 = 1.9e-5 per_second;
  k236 = 0.0461 per_second;
  k237 = 0 per_second;
  k238 = 0.00160781533 per_second;
  k239 = 0.001125471 per_second;
  k240 = 0.0007878297 per_second;
  k241 = 0.000551481 per_second;
  k242 = 5.51481e-5 per_second;
  k243 = 1.9e-5 per_second;
  k244 = 0.0461 per_second;
  k245 = 0 per_second;
  k246 = 0.00160781533 per_second;
  k247 = 0.001125471 per_second;
  k248 = 0.0007878297 per_second;
  k249 = 0.000551481 per_second;
  k250 = 5.51481e-5 per_second;
  k251 = 1.9e-5 per_second;
  k252 = 0.0461 per_second;
  k253 = 0 per_second;
  k254 = 0.00160781533 per_second;
  k255 = 0.001125471 per_second;
  k256 = 0.0007878297 per_second;
  k257 = 0.000551481 per_second;
  k258 = 5.51481e-5 per_second;
  k259 = 1.9e-5 per_second;
  k260 = 0.0461 per_second;
  k261 = 0 per_second;
  k262 = 0.00160781533 per_second;
  k263 = 0.001125471 per_second;
  k264 = 0.0007878297 per_second;
  k265 = 0.000551481 per_second;
  k266 = 5.51481e-5 per_second;
  k267 = 1.9e-5 per_second;
  k268 = 0.0461 per_second;
  k269 = 0 per_second;
  k270 = 0.00160781533 per_second;
  k271 = 0.001125471 per_second;
  k272 = 0.0007878297 per_second;
  k273 = 0.000551481 per_second;
  k274 = 5.51481e-5 per_second;
  k275 = 1.9e-5 per_second;
  k276 = 0.0461 per_second;
  k277 = 0 per_second;
  k278 = 0.00160781533 per_second;
  k279 = 0.001125471 per_second;
  k280 = 0.0007878297 per_second;
  k281 = 0.000551481 per_second;
  k282 = 5.51481e-5 per_second;
  k283 = 1.9e-5 per_second;
  k284 = 0.0461 per_second;
  k285 = 0 per_second;
  k286 = 0.00160781533 per_second;
  k287 = 0.001125471 per_second;
  k288 = 0.0007878297 per_second;
  k289 = 0.000551481 per_second;
  k290 = 5.51481e-5 per_second;
  k291 = 1.9e-5 per_second;
  k292 = 0.0461 per_second;
  k293 = 0 per_second;
  k294 = 0.00160781533 per_second;
  k295 = 0.001125471 per_second;
  k296 = 0.0007878297 per_second;
  k297 = 0.000551481 per_second;
  k298 = 5.51481e-5 per_second;
  k299 = 1.9e-5 per_second;
  k300 = 0.0461 per_second;
  k301 = 0 per_second;
  k302 = 0.00160781533 per_second;
  k303 = 0.001125471 per_second;
  k304 = 0.0007878297 per_second;
  k305 = 0.000551481 per_second;
  k306 = 5.51481e-5 per_second;
  k307 = 1.9e-5 per_second;
  k308 = 0.0461 per_second;
  k309 = 0 per_second;
  k310 = 0.00160781533 per_second;
  k311 = 0.001125471 per_second;
  k312 = 0.0007878297 per_second;
  k313 = 0.000551481 per_second;
  k314 = 5.51481e-5 per_second;
  k315 = 1.9e-5 per_second;
  k316 = 0.0461 per_second;
  k317 = 0 per_second;
  k318 = 0.00160781533 per_second;
  k319 = 0.001125471 per_second;
  k320 = 0.0007878297 per_second;
  k321 = 0.000551481 per_second;
  k322 = 5.51481e-5 per_second;
  k323 = 1.9e-5 per_second;
  k324 = 0.0461 per_second;
  k325 = 0 per_second;
  k326 = 0.00160781533 per_second;
  k327 = 0.001125471 per_second;
  k328 = 0.0007878297 per_second;
  k329 = 0.000551481 per_second;
  k330 = 5.51481e-5 per_second;
  k331 = 1.9e-5 per_second;
  k332 = 0.0461 per_second;
  k333 = 0 per_second;
  k334 = 0.00160781533 per_second;
  k335 = 0.001125471 per_second;
  k336 = 0.0007878297 per_second;
  k337 = 0.000551481 per_second;
  k338 = 5.51481e-5 per_second;
  k339 = 1.9e-5 per_second;
  k340 = 0.0461 per_second;
  k341 = 0 per_second;
  k342 = 0.00160781533 per_second;
  k343 = 0.001125471 per_second;
  k344 = 0.0007878297 per_second;
  k345 = 0.000551481 per_second;
  k346 = 5.51481e-5 per_second;
  k347 = 1.9e-5 per_second;
  k348 = 0.0461 per_second;
  k349 = 0 per_second;
  k350 = 0.00160781533 per_second;
  k351 = 0.001125471 per_second;
  k352 = 0.0007878297 per_second;
  k353 = 0.000551481 per_second;
  k354 = 5.51481e-5 per_second;
  k355 = 1.9e-5 per_second;
  k356 = 0.0461 per_second;
  k357 = 0 per_second;
  k358 = 0.00160781533 per_second;
  k359 = 0.001125471 per_second;
  k360 = 0.0007878297 per_second;
  k361 = 0.000551481 per_second;
  k362 = 5.51481e-5 per_second;
  k363 = 1.9e-5 per_second;
  k364 = 0.0461 per_second;
  k365 = 0 per_second;
  k366 = 0.00160781533 per_second;
  k367 = 0.001125471 per_second;
  k368 = 0.0007878297 per_second;
  k369 = 0.000551481 per_second;
  k370 = 5.51481e-5 per_second;
  k371 = 1.9e-5 per_second;
  k372 = 0.0461 per_second;
  k373 = 0 per_second;
  k374 = 0.00160781533 per_second;
  k375 = 0.001125471 per_second;
  k376 = 0.0007878297 per_second;
  k377 = 0.000551481 per_second;
  k378 = 5.51481e-5 per_second;
  k379 = 1.9e-5 per_second;
  k380 = 0.0461 per_second;
  k381 = 0 per_second;
  k382 = 0.00160781533 per_second;
  k383 = 0.001125471 per_second;
  k384 = 0.0007878297 per_second;
  k385 = 0.000551481 per_second;
  k386 = 5.51481e-5 per_second;
  k387 = 1.9e-5 per_second;
  k388 = 0.0461 per_second;
  k389 = 0 per_second;
  k390 = 0.00160781533 per_second;
  k391 = 0.001125471 per_second;
  k392 = 0.0007878297 per_second;
  k393 = 0.000551481 per_second;
  k394 = 5.51481e-5 per_second;
  k395 = 1.9e-5 per_second;
  k396 = 0.0461 per_second;
  k397 = 0 per_second;
  k398 = 0.00160781533 per_second;
  k399 = 0.001125471 per_second;
  k400 = 0.0007878297 per_second;
  k401 = 0.000551481 per_second;
  k402 = 5.51481e-5 per_second;
  k403 = 1.9e-5 per_second;
  k404 = 0.0461 per_second;
  k405 = 0 per_second;
  k406 = 0.00160781533 per_second;
  k407 = 0.001125471 per_second;
  k408 = 0.0007878297 per_second;
  k409 = 0.000551481 per_second;
  k410 = 5.51481e-5 per_second;
  k411 = 1.9e-5 per_second;
  k412 = 0.0461 per_second;
  k413 = 0 per_second;
  k414 = 0.00160781533 per_second;
  k415 = 0.001125471 per_second;
  k416 = 0.0007878297 per_second;
  k417 = 0.000551481 per_second;
  k418 = 5.51481e-5 per_second;
  k419 = 1.9e-5 per_second;
  k420 = 0.0461 per_second;
  k421 = 0 per_second;
  k422 = 0.00160781533 per_second;
  k423 = 0.001125471 per_second;
  k424 = 0.0007878297 per_second;
  k425 = 0.000551481 per_second;
  k426 = 5.51481e-5 per_second;
  k427 = 1.9e-5 per_second;
  k428 = 0.0461 per_second;
  k429 = 0 per_second;
  k430 = 0.00160781533 per_second;
  k431 = 0.001125471 per_second;
  k432 = 0.0007878297 per_second;
  k433 = 0.000551481 per_second;
  k434 = 5.51481e-5 per_second;
  k435 = 1.9e-5 per_second;
  k436 = 0.0461 per_second;
  k437 = 0 per_second;
  k438 = 0.00160781533 per_second;
  k439 = 0.001125471 per_second;
  k440 = 0.0007878297 per_second;
  k441 = 0.000551481 per_second;
  k442 = 5.51481e-5 per_second;
  k443 = 1.9e-5 per_second;
  k444 = 0.0461 per_second;
  k445 = 0 per_second;
  k446 = 0.00160781533 per_second;
  k447 = 0.001125471 per_second;
  k448 = 0.0007878297 per_second;
  k449 = 0.000551481 per_second;
  k450 = 5.51481e-5 per_second;
  k451 = 1.9e-5 per_second;
  k452 = 0.0461 per_second;
  k453 = 0 per_second;
  k454 = 0.00160781533 per_second;
  k455 = 0.001125471 per_second;
  k456 = 0.0007878297 per_second;
  k457 = 0.000551481 per_second;
  k458 = 5.51481e-5 per_second;
  k459 = 1.9e-5 per_second;
  k460 = 0.0461 per_second;
  k461 = 0 per_second;
  k462 = 0.00160781533 per_second;
  k463 = 0.001125471 per_second;
  k464 = 0.0007878297 per_second;
  k465 = 0.000551481 per_second;
  k466 = 5.51481e-5 per_second;
  k467 = 1.9e-5 per_second;
  k468 = 0.0461 per_second;
  k469 = 0 per_second;
  k470 = 0.00160781533 per_second;
  k471 = 0.001125471 per_second;
  k472 = 0.0007878297 per_second;
  k473 = 0.000551481 per_second;
  k474 = 5.51481e-5 per_second;
  k475 = 1.9e-5 per_second;
  k476 = 0.0461 per_second;
  k477 = 0 per_second;
  k478 = 0.00160781533 per_second;
  k479 = 0.001125471 per_second;
  k480 = 0.0007878297 per_second;
  k481 = 0.000551481 per_second;
  k482 = 5.51481e-5 per_second;
  k483 = 1.9e-5 per_second;
  k484 = 0.0461 per_second;
  k485 = 0 per_second;
  k486 = 0.00160781533 per_second;
  k487 = 0.001125471 per_second;
  k488 = 0.0007878297 per_second;
  k489 = 0.000551481 per_second;
  k490 = 5.51481e-5 per_second;
  k491 = 1.9e-5 per_second;
  k492 = 0.0461 per_second;
  k493 = 0 per_second;
  k494 = 0.00160781533 per_second;
  k495 = 0.001125471 per_second;
  k496 = 0.0007878297 per_second;
  k497 = 0.000551481 per_second;
  k498 = 5.51481e-5 per_second;
  k499 = 1.9e-5 per_second;
  k500 = 0.0461 per_second;
  k501 = 0 per_second;
  k502 = 0.00160781533 per_second;
  k503 = 0.001125471 per_second;
  k504 = 0.0007878297 per_second;
  k505 = 0.000551481 per_second;
  k506 = 5.51481e-5 per_second;
  k507 = 1.9e-5 per_second;
  k508 = 0.0461 per_second;
  k509 = 0 per_second;
  k510 = 0.00160781533 per_second;
  k511 = 0.001125471 per_second;
  k512 = 0.0007878297 per_second;
  k513 = 0.000551481 per_second;
  k514 = 5.51481e-5 per_second;
  k515 = 1.9e-5 per_second;
  k516 = 0.0461 per_second;
  k517 = 0 per_second;
  k518 = 0.00160781533 per_second;
  k519 = 0.001125471 per_second;
  k520 = 0.0007878297 per_second;
  k521 = 0.000551481 per_second;
  k522 = 5.51481e-5 per_second;
  k523 = 1.9e-5 per_second;
  k524 = 0.0461 per_second;
  k525 = 0 per_second;
  k526 = 0.00160781533 per_second;
  k527 = 0.001125471 per_second;
  k528 = 0.0007878297 per_second;
  k529 = 0.000551481 per_second;
  k530 = 5.51481e-5 per_second;
  k531 = 1.9e-5 per_second;
  k532 = 0.0461 per_second;
  k533 = 0 per_second;
  k534 = 0.00160781533 per_second;
  k535 = 0.001125471 per_second;
  k536 = 0.0007878297 per_second;
  k537 = 0.000551481 per_second;
  k538 = 5.51481e-5 per_second;
  k539 = 1.9e-5 per_second;
  k540 = 0.0461 per_second;
  k541 = 0 per_second;
  k542 = 0.00160781533 per_second;
  k543 = 0.001125471 per_second;
  k544 = 0.0007878297 per_second;
  k545 = 0.000551481 per_second;
  k546 = 5.51481e-5 per_second;
  k547 = 1.9e-5 per_second;
  k548 = 0.0461 per_second;
  k549 = 0 per_second;
  k550 = 0.00160781533 per_second;
  k551 = 0.001125471 per_second;
  k552 = 0.0007878297 per_second;
  k553 = 0.000551481 per_second;
  k554 = 5.51481e-5 per_second;
  k555 = 1.9e-5 per_second;
  k556 = 0.0461 per_second;
  k557 = 1.9e-5 per_second;
  k558 = 0.0461 per_second;
  k559 = 1.9e-5 per_second;
  k560 = 0.0461 per_second;
  k561 = 1.9e-5 per_second;
  k562 = 0.0461 per_second;
  k563 = 1.9e-5 per_second;
  k564 = 0.0461 per_second;
  k565 = 1.9e-5 per_second;
  k566 = 0.0461 per_second;
  k567 = 1.9e-5 per_second;
  k568 = 0.0461 per_second;
  k569 = 1.9e-5 per_second;
  k570 = 0.0461 per_second;
  k571 = 1.9e-5 per_second;
  k572 = 0.0461 per_second;
  k573 = 1.9e-5 per_second;
  k574 = 0.0461 per_second;
  k575 = 1.9e-5 per_second;
  k576 = 0.0461 per_second;
  k577 = 1.9e-5 per_second;
  k578 = 0.0461 per_second;
  k579 = 1.9e-5 per_second;
  k580 = 0.0461 per_second;
  k581 = 1.9e-5 per_second;
  k582 = 0.0461 per_second;
  k583 = 1.9e-5 per_second;
  k584 = 0.0461 per_second;
  k585 = 1.9e-5 per_second;
  k586 = 0.0461 per_second;
  k587 = 1.9e-5 per_second;
  k588 = 0.0461 per_second;
  k589 = 1.9e-5 per_second;
  k590 = 0.0461 per_second;
  k591 = 1.9e-5 per_second;
  k592 = 0.0461 per_second;
  k593 = 1.9e-5 per_second;
  k594 = 0.0461 per_second;
  k595 = 1.9e-5 per_second;
  k596 = 0.0461 per_second;
  k597 = 1.9e-5 per_second;
  k598 = 0.0461 per_second;
  k599 = 1.9e-5 per_second;
  k600 = 0.0461 per_second;
  k601 = 1.9e-5 per_second;
  k602 = 0.0461 per_second;
  k603 = 1.9e-5 per_second;
  k604 = 0.0461 per_second;
  k605 = 1.9e-5 per_second;
  k606 = 0.0461 per_second;
  k607 = 1.9e-5 per_second;
  k608 = 0.0461 per_second;
  k609 = 1.9e-5 per_second;
  k610 = 0.0461 per_second;
  k611 = 1.9e-5 per_second;
  k612 = 0.0461 per_second;
  k613 = 1.9e-5 per_second;
  k614 = 0.0461 per_second;
  k615 = 1.9e-5 per_second;
  k616 = 0.0461 per_second;
  k617 = 1.9e-5 per_second;
  k618 = 0.0461 per_second;
  k619 = 1.9e-5 per_second;
  k620 = 0.0461 per_second;
  k621 = 1.9e-5 per_second;
  k622 = 0.0461 per_second;
  k623 = 1.9e-5 per_second;
  k624 = 0.0461 per_second;
  k625 = 1.9e-5 per_second;
  k626 = 0.0461 per_second;
  k627 = 1.9e-5 per_second;
  k628 = 0.0461 per_second;
  k629 = 1.9e-5 per_second;
  k630 = 0.0461 per_second;
  k631 = 1.9e-5 per_second;
  k632 = 0.0461 per_second;
  k633 = 1.9e-5 per_second;
  k634 = 0.0461 per_second;
  k635 = 1.9e-5 per_second;

  // Reactions:
  translation_N: mN => mN + N; k0*mN*c1;
  N_degradation: N => ; k1*N*c1;
  translation_P: mP => mP + P; k2*mP*c1;
  P_degradation: P => ; k3*P*c1;
  translation_M: mM => mM + M; k4*mM*c1;
  M_degradation: M => ; k5*M*c1;
  translation_G: mG => mG + G; k6*mG*c1;
  G_degradation: G => ; k7*G*c1;
  translation_L: mL => mL + L; k8*mL*c1;
  L_degradation: L => ; k9*L*c1;
  mN_degradation: mN => ; k10*mN*c1;
  mP_degradation: mP => ; k11*mP*c1;
  mM_degradation: mM => ; k12*mM*c1;
  mG_degradation: mG => ; k13*mG*c1;
  mL_degradation: mL => ; k14*mL*c1;
  Virion_Budding: nsg_N20_P20_L20_M20_G20 => V; k15*nsg_N20_P20_L20_M20_G20*c1;
  negative_strand_encapsidation: nsg + N => nsg_N1; k16*nsg*N*c1;
  positive_strand_synthesis_1_1040: nsg_N1 + N => nsg_N1 + psg + N; k17*nsg_N1*N*c1;
  transcription_N_0_4040: nsg_N1 => nsg_N1 + mN; k18*nsg_N1*c1;
  transcription_P_0_9040: nsg_N1 => nsg_N1 + mN + mP; k19*nsg_N1*c1;
  transcription_M_0_14040: nsg_N1 => nsg_N1 + mM; k20*nsg_N1*c1;
  transcription_G_0_19040: nsg_N1 => nsg_N1 + mG; k21*nsg_N1*c1;
  transcription_L_0_24040: nsg_N1 => nsg_N1 + mL; k22*nsg_N1*c1;
  nsg_degradation_34040: nsg_N1 => ; k23*nsg_N1*c1;
  negative_strand_encapsidation_1: nsg_N1 + N => nsg_N2; k24*nsg_N1*N*c1;
  positive_strand_synthesis_1_1140: nsg_N2 + N => nsg_N2 + psg + N; k25*nsg_N2*N*c1;
  transcription_N_0_4140: nsg_N2 => nsg_N2 + mN; k26*nsg_N2*c1;
  transcription_P_0_9140: nsg_N2 => nsg_N2 + mN + mP; k27*nsg_N2*c1;
  transcription_M_0_14140: nsg_N2 => nsg_N2 + mM; k28*nsg_N2*c1;
  transcription_G_0_19140: nsg_N2 => nsg_N2 + mG; k29*nsg_N2*c1;
  transcription_L_0_24140: nsg_N2 => nsg_N2 + mL; k30*nsg_N2*c1;
  nsg_degradation_34140: nsg_N2 => ; k31*nsg_N2*c1;
  negative_strand_encapsidation_2: nsg_N2 + N => nsg_N3; k32*nsg_N2*N*c1;
  positive_strand_synthesis_1_1240: nsg_N3 + N => nsg_N3 + psg + N; k33*nsg_N3*N*c1;
  transcription_N_0_4240: nsg_N3 => nsg_N3 + mN; k34*nsg_N3*c1;
  transcription_P_0_9240: nsg_N3 => nsg_N3 + mN + mP; k35*nsg_N3*c1;
  transcription_M_0_14240: nsg_N3 => nsg_N3 + mM; k36*nsg_N3*c1;
  transcription_G_0_19240: nsg_N3 => nsg_N3 + mG; k37*nsg_N3*c1;
  transcription_L_0_24240: nsg_N3 => nsg_N3 + mL; k38*nsg_N3*c1;
  nsg_degradation_34240: nsg_N3 => ; k39*nsg_N3*c1;
  negative_strand_encapsidation_3: nsg_N3 + N => nsg_N4; k40*nsg_N3*N*c1;
  positive_strand_synthesis_1_1340: nsg_N4 + N => nsg_N4 + psg + N; k41*nsg_N4*N*c1;
  transcription_N_0_4340: nsg_N4 => nsg_N4 + mN; k42*nsg_N4*c1;
  transcription_P_0_9340: nsg_N4 => nsg_N4 + mN + mP; k43*nsg_N4*c1;
  transcription_M_0_14340: nsg_N4 => nsg_N4 + mM; k44*nsg_N4*c1;
  transcription_G_0_19340: nsg_N4 => nsg_N4 + mG; k45*nsg_N4*c1;
  transcription_L_0_24340: nsg_N4 => nsg_N4 + mL; k46*nsg_N4*c1;
  nsg_degradation_34340: nsg_N4 => ; k47*nsg_N4*c1;
  negative_strand_encapsidation_4: nsg_N4 + N => nsg_N5; k48*nsg_N4*N*c1;
  positive_strand_synthesis_1_1440: nsg_N5 + N => nsg_N5 + psg + N; k49*nsg_N5*N*c1;
  transcription_N_0_4440: nsg_N5 => nsg_N5 + mN; k50*nsg_N5*c1;
  transcription_P_0_9440: nsg_N5 => nsg_N5 + mN + mP; k51*nsg_N5*c1;
  transcription_M_0_14440: nsg_N5 => nsg_N5 + mM; k52*nsg_N5*c1;
  transcription_G_0_19440: nsg_N5 => nsg_N5 + mG; k53*nsg_N5*c1;
  transcription_L_0_24440: nsg_N5 => nsg_N5 + mL; k54*nsg_N5*c1;
  nsg_degradation_34440: nsg_N5 => ; k55*nsg_N5*c1;
  negative_strand_encapsidation_5: nsg_N5 + N => nsg_N6; k56*nsg_N5*N*c1;
  positive_strand_synthesis_1_1540: nsg_N6 + N => nsg_N6 + psg + N; k57*nsg_N6*N*c1;
  transcription_N_0_4540: nsg_N6 => nsg_N6 + mN; k58*nsg_N6*c1;
  transcription_P_0_9540: nsg_N6 => nsg_N6 + mN + mP; k59*nsg_N6*c1;
  transcription_M_0_14540: nsg_N6 => nsg_N6 + mM; k60*nsg_N6*c1;
  transcription_G_0_19540: nsg_N6 => nsg_N6 + mG; k61*nsg_N6*c1;
  transcription_L_0_24540: nsg_N6 => nsg_N6 + mL; k62*nsg_N6*c1;
  nsg_degradation_34540: nsg_N6 => ; k63*nsg_N6*c1;
  negative_strand_encapsidation_6: nsg_N6 + N => nsg_N7; k64*nsg_N6*N*c1;
  positive_strand_synthesis_1_1640: nsg_N7 + N => nsg_N7 + psg + N; k65*nsg_N7*N*c1;
  transcription_N_0_4640: nsg_N7 => nsg_N7 + mN; k66*nsg_N7*c1;
  transcription_P_0_9640: nsg_N7 => nsg_N7 + mN + mP; k67*nsg_N7*c1;
  transcription_M_0_14640: nsg_N7 => nsg_N7 + mM; k68*nsg_N7*c1;
  transcription_G_0_19640: nsg_N7 => nsg_N7 + mG; k69*nsg_N7*c1;
  transcription_L_0_24640: nsg_N7 => nsg_N7 + mL; k70*nsg_N7*c1;
  nsg_degradation_34640: nsg_N7 => ; k71*nsg_N7*c1;
  negative_strand_encapsidation_7: nsg_N7 + N => nsg_N8; k72*nsg_N7*N*c1;
  positive_strand_synthesis_1_1740: nsg_N8 + N => nsg_N8 + psg + N; k73*nsg_N8*N*c1;
  transcription_N_0_4740: nsg_N8 => nsg_N8 + mN; k74*nsg_N8*c1;
  transcription_P_0_9740: nsg_N8 => nsg_N8 + mN + mP; k75*nsg_N8*c1;
  transcription_M_0_14740: nsg_N8 => nsg_N8 + mM; k76*nsg_N8*c1;
  transcription_G_0_19740: nsg_N8 => nsg_N8 + mG; k77*nsg_N8*c1;
  transcription_L_0_24740: nsg_N8 => nsg_N8 + mL; k78*nsg_N8*c1;
  nsg_degradation_34740: nsg_N8 => ; k79*nsg_N8*c1;
  negative_strand_encapsidation_8: nsg_N8 + N => nsg_N9; k80*nsg_N8*N*c1;
  positive_strand_synthesis_1_1840: nsg_N9 + N => nsg_N9 + psg + N; k81*nsg_N9*N*c1;
  transcription_N_0_4840: nsg_N9 => nsg_N9 + mN; k82*nsg_N9*c1;
  transcription_P_0_9840: nsg_N9 => nsg_N9 + mN + mP; k83*nsg_N9*c1;
  transcription_M_0_14840: nsg_N9 => nsg_N9 + mM; k84*nsg_N9*c1;
  transcription_G_0_19840: nsg_N9 => nsg_N9 + mG; k85*nsg_N9*c1;
  transcription_L_0_24840: nsg_N9 => nsg_N9 + mL; k86*nsg_N9*c1;
  nsg_degradation_34840: nsg_N9 => ; k87*nsg_N9*c1;
  negative_strand_encapsidation_9: nsg_N9 + N => nsg_N10; k88*nsg_N9*N*c1;
  positive_strand_synthesis_1_1940: nsg_N10 + N => nsg_N10 + psg + N; k89*nsg_N10*N*c1;
  transcription_N_0_4940: nsg_N10 => nsg_N10 + mN; k90*nsg_N10*c1;
  transcription_P_0_9940: nsg_N10 => nsg_N10 + mN + mP; k91*nsg_N10*c1;
  transcription_M_0_14940: nsg_N10 => nsg_N10 + mM; k92*nsg_N10*c1;
  transcription_G_0_19940: nsg_N10 => nsg_N10 + mG; k93*nsg_N10*c1;
  transcription_L_0_24940: nsg_N10 => nsg_N10 + mL; k94*nsg_N10*c1;
  nsg_degradation_34940: nsg_N10 => ; k95*nsg_N10*c1;
  negative_strand_encapsidation_10: nsg_N10 + N => nsg_N11; k96*nsg_N10*N*c1;
  positive_strand_synthesis_1_11040: nsg_N11 + N => nsg_N11 + psg + N; k97*nsg_N11*N*c1;
  transcription_N_0_41040: nsg_N11 => nsg_N11 + mN; k98*nsg_N11*c1;
  transcription_P_0_91040: nsg_N11 => nsg_N11 + mN + mP; k99*nsg_N11*c1;
  transcription_M_0_141040: nsg_N11 => nsg_N11 + mM; k100*nsg_N11*c1;
  transcription_G_0_191040: nsg_N11 => nsg_N11 + mG; k101*nsg_N11*c1;
  transcription_L_0_241040: nsg_N11 => nsg_N11 + mL; k102*nsg_N11*c1;
  nsg_degradation_341040: nsg_N11 => ; k103*nsg_N11*c1;
  negative_strand_encapsidation_11: nsg_N11 + N => nsg_N12; k104*nsg_N11*N*c1;
  positive_strand_synthesis_1_11140: nsg_N12 + N => nsg_N12 + psg + N; k105*nsg_N12*N*c1;
  transcription_N_0_41140: nsg_N12 => nsg_N12 + mN; k106*nsg_N12*c1;
  transcription_P_0_91140: nsg_N12 => nsg_N12 + mN + mP; k107*nsg_N12*c1;
  transcription_M_0_141140: nsg_N12 => nsg_N12 + mM; k108*nsg_N12*c1;
  transcription_G_0_191140: nsg_N12 => nsg_N12 + mG; k109*nsg_N12*c1;
  transcription_L_0_241140: nsg_N12 => nsg_N12 + mL; k110*nsg_N12*c1;
  nsg_degradation_341140: nsg_N12 => ; k111*nsg_N12*c1;
  negative_strand_encapsidation_12: nsg_N12 + N => nsg_N13; k112*nsg_N12*N*c1;
  positive_strand_synthesis_1_11240: nsg_N13 + N => nsg_N13 + psg + N; k113*nsg_N13*N*c1;
  transcription_N_0_41240: nsg_N13 => nsg_N13 + mN; k114*nsg_N13*c1;
  transcription_P_0_91240: nsg_N13 => nsg_N13 + mN + mP; k115*nsg_N13*c1;
  transcription_M_0_141240: nsg_N13 => nsg_N13 + mM; k116*nsg_N13*c1;
  transcription_G_0_191240: nsg_N13 => nsg_N13 + mG; k117*nsg_N13*c1;
  transcription_L_0_241240: nsg_N13 => nsg_N13 + mL; k118*nsg_N13*c1;
  nsg_degradation_341240: nsg_N13 => ; k119*nsg_N13*c1;
  negative_strand_encapsidation_13: nsg_N13 + N => nsg_N14; k120*nsg_N13*N*c1;
  positive_strand_synthesis_1_11340: nsg_N14 + N => nsg_N14 + psg + N; k121*nsg_N14*N*c1;
  transcription_N_0_41340: nsg_N14 => nsg_N14 + mN; k122*nsg_N14*c1;
  transcription_P_0_91340: nsg_N14 => nsg_N14 + mN + mP; k123*nsg_N14*c1;
  transcription_M_0_141340: nsg_N14 => nsg_N14 + mM; k124*nsg_N14*c1;
  transcription_G_0_191340: nsg_N14 => nsg_N14 + mG; k125*nsg_N14*c1;
  transcription_L_0_241340: nsg_N14 => nsg_N14 + mL; k126*nsg_N14*c1;
  nsg_degradation_341340: nsg_N14 => ; k127*nsg_N14*c1;
  negative_strand_encapsidation_14: nsg_N14 + N => nsg_N15; k128*nsg_N14*N*c1;
  positive_strand_synthesis_1_11440: nsg_N15 + N => nsg_N15 + psg + N; k129*nsg_N15*N*c1;
  transcription_N_0_41440: nsg_N15 => nsg_N15 + mN; k130*nsg_N15*c1;
  transcription_P_0_91440: nsg_N15 => nsg_N15 + mN + mP; k131*nsg_N15*c1;
  transcription_M_0_141440: nsg_N15 => nsg_N15 + mM; k132*nsg_N15*c1;
  transcription_G_0_191440: nsg_N15 => nsg_N15 + mG; k133*nsg_N15*c1;
  transcription_L_0_241440: nsg_N15 => nsg_N15 + mL; k134*nsg_N15*c1;
  nsg_degradation_341440: nsg_N15 => ; k135*nsg_N15*c1;
  negative_strand_encapsidation_15: nsg_N15 + N => nsg_N16; k136*nsg_N15*N*c1;
  positive_strand_synthesis_1_11540: nsg_N16 + N => nsg_N16 + psg + N; k137*nsg_N16*N*c1;
  transcription_N_0_41540: nsg_N16 => nsg_N16 + mN; k138*nsg_N16*c1;
  transcription_P_0_91540: nsg_N16 => nsg_N16 + mN + mP; k139*nsg_N16*c1;
  transcription_M_0_141540: nsg_N16 => nsg_N16 + mM; k140*nsg_N16*c1;
  transcription_G_0_191540: nsg_N16 => nsg_N16 + mG; k141*nsg_N16*c1;
  transcription_L_0_241540: nsg_N16 => nsg_N16 + mL; k142*nsg_N16*c1;
  nsg_degradation_341540: nsg_N16 => ; k143*nsg_N16*c1;
  negative_strand_encapsidation_16: nsg_N16 + N => nsg_N17; k144*nsg_N16*N*c1;
  positive_strand_synthesis_1_11640: nsg_N17 + N => nsg_N17 + psg + N; k145*nsg_N17*N*c1;
  transcription_N_0_41640: nsg_N17 => nsg_N17 + mN; k146*nsg_N17*c1;
  transcription_P_0_91640: nsg_N17 => nsg_N17 + mN + mP; k147*nsg_N17*c1;
  transcription_M_0_141640: nsg_N17 => nsg_N17 + mM; k148*nsg_N17*c1;
  transcription_G_0_191640: nsg_N17 => nsg_N17 + mG; k149*nsg_N17*c1;
  transcription_L_0_241640: nsg_N17 => nsg_N17 + mL; k150*nsg_N17*c1;
  nsg_degradation_341640: nsg_N17 => ; k151*nsg_N17*c1;
  negative_strand_encapsidation_17: nsg_N17 + N => nsg_N18; k152*nsg_N17*N*c1;
  positive_strand_synthesis_1_11740: nsg_N18 + N => nsg_N18 + psg + N; k153*nsg_N18*N*c1;
  transcription_N_0_41740: nsg_N18 => nsg_N18 + mN; k154*nsg_N18*c1;
  transcription_P_0_91740: nsg_N18 => nsg_N18 + mN + mP; k155*nsg_N18*c1;
  transcription_M_0_141740: nsg_N18 => nsg_N18 + mM; k156*nsg_N18*c1;
  transcription_G_0_191740: nsg_N18 => nsg_N18 + mG; k157*nsg_N18*c1;
  transcription_L_0_241740: nsg_N18 => nsg_N18 + mL; k158*nsg_N18*c1;
  nsg_degradation_341740: nsg_N18 => ; k159*nsg_N18*c1;
  negative_strand_encapsidation_18: nsg_N18 + N => nsg_N19; k160*nsg_N18*N*c1;
  positive_strand_synthesis_1_11840: nsg_N19 + N => nsg_N19 + psg + N; k161*nsg_N19*N*c1;
  transcription_N_0_41840: nsg_N19 => nsg_N19 + mN; k162*nsg_N19*c1;
  transcription_P_0_91840: nsg_N19 => nsg_N19 + mN + mP; k163*nsg_N19*c1;
  transcription_M_0_141840: nsg_N19 => nsg_N19 + mM; k164*nsg_N19*c1;
  transcription_G_0_191840: nsg_N19 => nsg_N19 + mG; k165*nsg_N19*c1;
  transcription_L_0_241840: nsg_N19 => nsg_N19 + mL; k166*nsg_N19*c1;
  nsg_degradation_341840: nsg_N19 => ; k167*nsg_N19*c1;
  negative_strand_encapsidation_19: nsg_N19 + N => nsg_N20; k168*nsg_N19*N*c1;
  positive_strand_synthesis_1_11940: nsg_N20 + N => nsg_N20 + psg + N; k169*nsg_N20*N*c1;
  transcription_N_0_41940: nsg_N20 => nsg_N20 + mN; k170*nsg_N20*c1;
  transcription_P_0_91940: nsg_N20 => nsg_N20 + mN + mP; k171*nsg_N20*c1;
  transcription_M_0_141940: nsg_N20 => nsg_N20 + mM; k172*nsg_N20*c1;
  transcription_G_0_191940: nsg_N20 => nsg_N20 + mG; k173*nsg_N20*c1;
  transcription_L_0_241940: nsg_N20 => nsg_N20 + mL; k174*nsg_N20*c1;
  nsg_degradation_341940: nsg_N20 => ; k175*nsg_N20*c1;
  positive_strand_encapsidation: psg + N => psg_N1; k176*psg*N*c1;
  negative_strand_synthesis_0040: psg_N1 + N => psg_N1 + nsg + N; k177*psg_N1*N*c1;
  psg_degradation_40040: psg_N1 => ; k178*psg_N1*c1;
  positive_strand_encapsidation_1: psg_N1 + N => psg_N2; k179*psg_N1*N*c1;
  negative_strand_synthesis_0140: psg_N2 + N => psg_N2 + nsg + N; k180*psg_N2*N*c1;
  psg_degradation_40140: psg_N2 => ; k181*psg_N2*c1;
  positive_strand_encapsidation_2: psg_N2 + N => psg_N3; k182*psg_N2*N*c1;
  negative_strand_synthesis_0240: psg_N3 + N => psg_N3 + nsg + N; k183*psg_N3*N*c1;
  psg_degradation_40240: psg_N3 => ; k184*psg_N3*c1;
  positive_strand_encapsidation_3: psg_N3 + N => psg_N4; k185*psg_N3*N*c1;
  negative_strand_synthesis_0340: psg_N4 + N => psg_N4 + nsg + N; k186*psg_N4*N*c1;
  psg_degradation_40340: psg_N4 => ; k187*psg_N4*c1;
  positive_strand_encapsidation_4: psg_N4 + N => psg_N5; k188*psg_N4*N*c1;
  negative_strand_synthesis_0440: psg_N5 + N => psg_N5 + nsg + N; k189*psg_N5*N*c1;
  psg_degradation_40440: psg_N5 => ; k190*psg_N5*c1;
  positive_strand_encapsidation_5: psg_N5 + N => psg_N6; k191*psg_N5*N*c1;
  negative_strand_synthesis_0540: psg_N6 + N => psg_N6 + nsg + N; k192*psg_N6*N*c1;
  psg_degradation_40540: psg_N6 => ; k193*psg_N6*c1;
  positive_strand_encapsidation_6: psg_N6 + N => psg_N7; k194*psg_N6*N*c1;
  negative_strand_synthesis_0640: psg_N7 + N => psg_N7 + nsg + N; k195*psg_N7*N*c1;
  psg_degradation_40640: psg_N7 => ; k196*psg_N7*c1;
  positive_strand_encapsidation_7: psg_N7 + N => psg_N8; k197*psg_N7*N*c1;
  negative_strand_synthesis_0740: psg_N8 + N => psg_N8 + nsg + N; k198*psg_N8*N*c1;
  psg_degradation_40740: psg_N8 => ; k199*psg_N8*c1;
  positive_strand_encapsidation_8: psg_N8 + N => psg_N9; k200*psg_N8*N*c1;
  negative_strand_synthesis_0840: psg_N9 + N => psg_N9 + nsg + N; k201*psg_N9*N*c1;
  psg_degradation_40840: psg_N9 => ; k202*psg_N9*c1;
  positive_strand_encapsidation_9: psg_N9 + N => psg_N10; k203*psg_N9*N*c1;
  negative_strand_synthesis_0940: psg_N10 + N => psg_N10 + nsg + N; k204*psg_N10*N*c1;
  psg_degradation_40940: psg_N10 => ; k205*psg_N10*c1;
  positive_strand_encapsidation_10: psg_N10 + N => psg_N11; k206*psg_N10*N*c1;
  negative_strand_synthesis_01040: psg_N11 + N => psg_N11 + nsg + N; k207*psg_N11*N*c1;
  psg_degradation_401040: psg_N11 => ; k208*psg_N11*c1;
  positive_strand_encapsidation_11: psg_N11 + N => psg_N12; k209*psg_N11*N*c1;
  negative_strand_synthesis_01140: psg_N12 + N => psg_N12 + nsg + N; k210*psg_N12*N*c1;
  psg_degradation_401140: psg_N12 => ; k211*psg_N12*c1;
  positive_strand_encapsidation_12: psg_N12 + N => psg_N13; k212*psg_N12*N*c1;
  negative_strand_synthesis_01240: psg_N13 + N => psg_N13 + nsg + N; k213*psg_N13*N*c1;
  psg_degradation_401240: psg_N13 => ; k214*psg_N13*c1;
  positive_strand_encapsidation_13: psg_N13 + N => psg_N14; k215*psg_N13*N*c1;
  negative_strand_synthesis_01340: psg_N14 + N => psg_N14 + nsg + N; k216*psg_N14*N*c1;
  psg_degradation_401340: psg_N14 => ; k217*psg_N14*c1;
  positive_strand_encapsidation_14: psg_N14 + N => psg_N15; k218*psg_N14*N*c1;
  negative_strand_synthesis_01440: psg_N15 + N => psg_N15 + nsg + N; k219*psg_N15*N*c1;
  psg_degradation_401440: psg_N15 => ; k220*psg_N15*c1;
  positive_strand_encapsidation_15: psg_N15 + N => psg_N16; k221*psg_N15*N*c1;
  negative_strand_synthesis_01540: psg_N16 + N => psg_N16 + nsg + N; k222*psg_N16*N*c1;
  psg_degradation_401540: psg_N16 => ; k223*psg_N16*c1;
  positive_strand_encapsidation_16: psg_N16 + N => psg_N17; k224*psg_N16*N*c1;
  negative_strand_synthesis_01640: psg_N17 + N => psg_N17 + nsg + N; k225*psg_N17*N*c1;
  psg_degradation_401640: psg_N17 => ; k226*psg_N17*c1;
  positive_strand_encapsidation_17: psg_N17 + N => psg_N18; k227*psg_N17*N*c1;
  negative_strand_synthesis_01740: psg_N18 + N => psg_N18 + nsg + N; k228*psg_N18*N*c1;
  psg_degradation_401740: psg_N18 => ; k229*psg_N18*c1;
  positive_strand_encapsidation_18: psg_N18 + N => psg_N19; k230*psg_N18*N*c1;
  negative_strand_synthesis_01840: psg_N19 + N => psg_N19 + nsg + N; k231*psg_N19*N*c1;
  psg_degradation_401840: psg_N19 => ; k232*psg_N19*c1;
  positive_strand_encapsidation_19: psg_N19 + N => psg_N20; k233*psg_N19*N*c1;
  negative_strand_synthesis_01940: psg_N20 + N => psg_N20 + nsg + N; k234*psg_N20*N*c1;
  psg_degradation_401940: psg_N20 => ; k235*psg_N20*c1;
  negative_strand_p_binding: nsg_N20 + P => nsg_N20_P1; k236*nsg_N20*P*c1;
  positive_strand_synthesis_2_2040: nsg_N20_P1 + N => nsg_N20_P1 + psg + N; k237*nsg_N20_P1*N*c1;
  transcription_N_1_5040: nsg_N20_P1 => nsg_N20_P1 + mN; k238*nsg_N20_P1*c1;
  transcription_P_1_10040: nsg_N20_P1 => nsg_N20_P1 + mP; k239*nsg_N20_P1*c1;
  transcription_M_1_15040: nsg_N20_P1 => nsg_N20_P1 + mM; k240*nsg_N20_P1*c1;
  transcription_G_1_20040: nsg_N20_P1 => nsg_N20_P1 + mG; k241*nsg_N20_P1*c1;
  transcription_L_1_25040: nsg_N20_P1 => nsg_N20_P1 + mL; k242*nsg_N20_P1*c1;
  nsg_N20_degradation_35040: nsg_N20_P1 => ; k243*nsg_N20_P1*c1;
  negative_strand_p_binding_1: nsg_N20_P1 + P => nsg_N20_P2; k244*nsg_N20_P1*P*c1;
  positive_strand_synthesis_2_2140: nsg_N20_P2 + N => nsg_N20_P2 + psg + N; k245*nsg_N20_P2*N*c1;
  transcription_N_1_5140: nsg_N20_P2 => nsg_N20_P2 + mN; k246*nsg_N20_P2*c1;
  transcription_P_1_10140: nsg_N20_P2 => nsg_N20_P2 + mP; k247*nsg_N20_P2*c1;
  transcription_M_1_15140: nsg_N20_P2 => nsg_N20_P2 + mM; k248*nsg_N20_P2*c1;
  transcription_G_1_20140: nsg_N20_P2 => nsg_N20_P2 + mG; k249*nsg_N20_P2*c1;
  transcription_L_1_25140: nsg_N20_P2 => nsg_N20_P2 + mL; k250*nsg_N20_P2*c1;
  nsg_N20_degradation_35140: nsg_N20_P2 => ; k251*nsg_N20_P2*c1;
  negative_strand_p_binding_2: nsg_N20_P2 + P => nsg_N20_P3; k252*nsg_N20_P2*P*c1;
  positive_strand_synthesis_2_2240: nsg_N20_P3 + N => nsg_N20_P3 + psg + N; k253*nsg_N20_P3*N*c1;
  transcription_N_1_5240: nsg_N20_P3 => nsg_N20_P3 + mN; k254*nsg_N20_P3*c1;
  transcription_P_1_10240: nsg_N20_P3 => nsg_N20_P3 + mP; k255*nsg_N20_P3*c1;
  transcription_M_1_15240: nsg_N20_P3 => nsg_N20_P3 + mM; k256*nsg_N20_P3*c1;
  transcription_G_1_20240: nsg_N20_P3 => nsg_N20_P3 + mG; k257*nsg_N20_P3*c1;
  transcription_L_1_25240: nsg_N20_P3 => nsg_N20_P3 + mL; k258*nsg_N20_P3*c1;
  nsg_N20_degradation_35240: nsg_N20_P3 => ; k259*nsg_N20_P3*c1;
  negative_strand_p_binding_3: nsg_N20_P3 + P => nsg_N20_P4; k260*nsg_N20_P3*P*c1;
  positive_strand_synthesis_2_2340: nsg_N20_P4 + N => nsg_N20_P4 + psg + N; k261*nsg_N20_P4*N*c1;
  transcription_N_1_5340: nsg_N20_P4 => nsg_N20_P4 + mN; k262*nsg_N20_P4*c1;
  transcription_P_1_10340: nsg_N20_P4 => nsg_N20_P4 + mP; k263*nsg_N20_P4*c1;
  transcription_M_1_15340: nsg_N20_P4 => nsg_N20_P4 + mM; k264*nsg_N20_P4*c1;
  transcription_G_1_20340: nsg_N20_P4 => nsg_N20_P4 + mG; k265*nsg_N20_P4*c1;
  transcription_L_1_25340: nsg_N20_P4 => nsg_N20_P4 + mL; k266*nsg_N20_P4*c1;
  nsg_N20_degradation_35340: nsg_N20_P4 => ; k267*nsg_N20_P4*c1;
  negative_strand_p_binding_4: nsg_N20_P4 + P => nsg_N20_P5; k268*nsg_N20_P4*P*c1;
  positive_strand_synthesis_2_2440: nsg_N20_P5 + N => nsg_N20_P5 + psg + N; k269*nsg_N20_P5*N*c1;
  transcription_N_1_5440: nsg_N20_P5 => nsg_N20_P5 + mN; k270*nsg_N20_P5*c1;
  transcription_P_1_10440: nsg_N20_P5 => nsg_N20_P5 + mP; k271*nsg_N20_P5*c1;
  transcription_M_1_15440: nsg_N20_P5 => nsg_N20_P5 + mM; k272*nsg_N20_P5*c1;
  transcription_G_1_20440: nsg_N20_P5 => nsg_N20_P5 + mG; k273*nsg_N20_P5*c1;
  transcription_L_1_25440: nsg_N20_P5 => nsg_N20_P5 + mL; k274*nsg_N20_P5*c1;
  nsg_N20_degradation_35440: nsg_N20_P5 => ; k275*nsg_N20_P5*c1;
  negative_strand_p_binding_5: nsg_N20_P5 + P => nsg_N20_P6; k276*nsg_N20_P5*P*c1;
  positive_strand_synthesis_2_2540: nsg_N20_P6 + N => nsg_N20_P6 + psg + N; k277*nsg_N20_P6*N*c1;
  transcription_N_1_5540: nsg_N20_P6 => nsg_N20_P6 + mN; k278*nsg_N20_P6*c1;
  transcription_P_1_10540: nsg_N20_P6 => nsg_N20_P6 + mP; k279*nsg_N20_P6*c1;
  transcription_M_1_15540: nsg_N20_P6 => nsg_N20_P6 + mM; k280*nsg_N20_P6*c1;
  transcription_G_1_20540: nsg_N20_P6 => nsg_N20_P6 + mG; k281*nsg_N20_P6*c1;
  transcription_L_1_25540: nsg_N20_P6 => nsg_N20_P6 + mL; k282*nsg_N20_P6*c1;
  nsg_N20_degradation_35540: nsg_N20_P6 => ; k283*nsg_N20_P6*c1;
  negative_strand_p_binding_6: nsg_N20_P6 + P => nsg_N20_P7; k284*nsg_N20_P6*P*c1;
  positive_strand_synthesis_2_2640: nsg_N20_P7 + N => nsg_N20_P7 + psg + N; k285*nsg_N20_P7*N*c1;
  transcription_N_1_5640: nsg_N20_P7 => nsg_N20_P7 + mN; k286*nsg_N20_P7*c1;
  transcription_P_1_10640: nsg_N20_P7 => nsg_N20_P7 + mP; k287*nsg_N20_P7*c1;
  transcription_M_1_15640: nsg_N20_P7 => nsg_N20_P7 + mM; k288*nsg_N20_P7*c1;
  transcription_G_1_20640: nsg_N20_P7 => nsg_N20_P7 + mG; k289*nsg_N20_P7*c1;
  transcription_L_1_25640: nsg_N20_P7 => nsg_N20_P7 + mL; k290*nsg_N20_P7*c1;
  nsg_N20_degradation_35640: nsg_N20_P7 => ; k291*nsg_N20_P7*c1;
  negative_strand_p_binding_7: nsg_N20_P7 + P => nsg_N20_P8; k292*nsg_N20_P7*P*c1;
  positive_strand_synthesis_2_2740: nsg_N20_P8 + N => nsg_N20_P8 + psg + N; k293*nsg_N20_P8*N*c1;
  transcription_N_1_5740: nsg_N20_P8 => nsg_N20_P8 + mN; k294*nsg_N20_P8*c1;
  transcription_P_1_10740: nsg_N20_P8 => nsg_N20_P8 + mP; k295*nsg_N20_P8*c1;
  transcription_M_1_15740: nsg_N20_P8 => nsg_N20_P8 + mM; k296*nsg_N20_P8*c1;
  transcription_G_1_20740: nsg_N20_P8 => nsg_N20_P8 + mG; k297*nsg_N20_P8*c1;
  transcription_L_1_25740: nsg_N20_P8 => nsg_N20_P8 + mL; k298*nsg_N20_P8*c1;
  nsg_N20_degradation_35740: nsg_N20_P8 => ; k299*nsg_N20_P8*c1;
  negative_strand_p_binding_8: nsg_N20_P8 + P => nsg_N20_P9; k300*nsg_N20_P8*P*c1;
  positive_strand_synthesis_2_2840: nsg_N20_P9 + N => nsg_N20_P9 + psg + N; k301*nsg_N20_P9*N*c1;
  transcription_N_1_5840: nsg_N20_P9 => nsg_N20_P9 + mN; k302*nsg_N20_P9*c1;
  transcription_P_1_10840: nsg_N20_P9 => nsg_N20_P9 + mP; k303*nsg_N20_P9*c1;
  transcription_M_1_15840: nsg_N20_P9 => nsg_N20_P9 + mM; k304*nsg_N20_P9*c1;
  transcription_G_1_20840: nsg_N20_P9 => nsg_N20_P9 + mG; k305*nsg_N20_P9*c1;
  transcription_L_1_25840: nsg_N20_P9 => nsg_N20_P9 + mL; k306*nsg_N20_P9*c1;
  nsg_N20_degradation_35840: nsg_N20_P9 => ; k307*nsg_N20_P9*c1;
  negative_strand_p_binding_9: nsg_N20_P9 + P => nsg_N20_P10; k308*nsg_N20_P9*P*c1;
  positive_strand_synthesis_2_2940: nsg_N20_P10 + N => nsg_N20_P10 + psg + N; k309*nsg_N20_P10*N*c1;
  transcription_N_1_5940: nsg_N20_P10 => nsg_N20_P10 + mN; k310*nsg_N20_P10*c1;
  transcription_P_1_10940: nsg_N20_P10 => nsg_N20_P10 + mP; k311*nsg_N20_P10*c1;
  transcription_M_1_15940: nsg_N20_P10 => nsg_N20_P10 + mM; k312*nsg_N20_P10*c1;
  transcription_G_1_20940: nsg_N20_P10 => nsg_N20_P10 + mG; k313*nsg_N20_P10*c1;
  transcription_L_1_25940: nsg_N20_P10 => nsg_N20_P10 + mL; k314*nsg_N20_P10*c1;
  nsg_N20_degradation_35940: nsg_N20_P10 => ; k315*nsg_N20_P10*c1;
  negative_strand_p_binding_10: nsg_N20_P10 + P => nsg_N20_P11; k316*nsg_N20_P10*P*c1;
  positive_strand_synthesis_2_21040: nsg_N20_P11 + N => nsg_N20_P11 + psg + N; k317*nsg_N20_P11*N*c1;
  transcription_N_1_51040: nsg_N20_P11 => nsg_N20_P11 + mN; k318*nsg_N20_P11*c1;
  transcription_P_1_101040: nsg_N20_P11 => nsg_N20_P11 + mP; k319*nsg_N20_P11*c1;
  transcription_M_1_151040: nsg_N20_P11 => nsg_N20_P11 + mM; k320*nsg_N20_P11*c1;
  transcription_G_1_201040: nsg_N20_P11 => nsg_N20_P11 + mG; k321*nsg_N20_P11*c1;
  transcription_L_1_251040: nsg_N20_P11 => nsg_N20_P11 + mL; k322*nsg_N20_P11*c1;
  nsg_N20_degradation_351040: nsg_N20_P11 => ; k323*nsg_N20_P11*c1;
  negative_strand_p_binding_11: nsg_N20_P11 + P => nsg_N20_P12; k324*nsg_N20_P11*P*c1;
  positive_strand_synthesis_2_21140: nsg_N20_P12 + N => nsg_N20_P12 + psg + N; k325*nsg_N20_P12*N*c1;
  transcription_N_1_51140: nsg_N20_P12 => nsg_N20_P12 + mN; k326*nsg_N20_P12*c1;
  transcription_P_1_101140: nsg_N20_P12 => nsg_N20_P12 + mP; k327*nsg_N20_P12*c1;
  transcription_M_1_151140: nsg_N20_P12 => nsg_N20_P12 + mM; k328*nsg_N20_P12*c1;
  transcription_G_1_201140: nsg_N20_P12 => nsg_N20_P12 + mG; k329*nsg_N20_P12*c1;
  transcription_L_1_251140: nsg_N20_P12 => nsg_N20_P12 + mL; k330*nsg_N20_P12*c1;
  nsg_N20_degradation_351140: nsg_N20_P12 => ; k331*nsg_N20_P12*c1;
  negative_strand_p_binding_12: nsg_N20_P12 + P => nsg_N20_P13; k332*nsg_N20_P12*P*c1;
  positive_strand_synthesis_2_21240: nsg_N20_P13 + N => nsg_N20_P13 + psg + N; k333*nsg_N20_P13*N*c1;
  transcription_N_1_51240: nsg_N20_P13 => nsg_N20_P13 + mN; k334*nsg_N20_P13*c1;
  transcription_P_1_101240: nsg_N20_P13 => nsg_N20_P13 + mP; k335*nsg_N20_P13*c1;
  transcription_M_1_151240: nsg_N20_P13 => nsg_N20_P13 + mM; k336*nsg_N20_P13*c1;
  transcription_G_1_201240: nsg_N20_P13 => nsg_N20_P13 + mG; k337*nsg_N20_P13*c1;
  transcription_L_1_251240: nsg_N20_P13 => nsg_N20_P13 + mL; k338*nsg_N20_P13*c1;
  nsg_N20_degradation_351240: nsg_N20_P13 => ; k339*nsg_N20_P13*c1;
  negative_strand_p_binding_13: nsg_N20_P13 + P => nsg_N20_P14; k340*nsg_N20_P13*P*c1;
  positive_strand_synthesis_2_21340: nsg_N20_P14 + N => nsg_N20_P14 + psg + N; k341*nsg_N20_P14*N*c1;
  transcription_N_1_51340: nsg_N20_P14 => nsg_N20_P14 + mN; k342*nsg_N20_P14*c1;
  transcription_P_1_101340: nsg_N20_P14 => nsg_N20_P14 + mP; k343*nsg_N20_P14*c1;
  transcription_M_1_151340: nsg_N20_P14 => nsg_N20_P14 + mM; k344*nsg_N20_P14*c1;
  transcription_G_1_201340: nsg_N20_P14 => nsg_N20_P14 + mG; k345*nsg_N20_P14*c1;
  transcription_L_1_251340: nsg_N20_P14 => nsg_N20_P14 + mL; k346*nsg_N20_P14*c1;
  nsg_N20_degradation_351340: nsg_N20_P14 => ; k347*nsg_N20_P14*c1;
  negative_strand_p_binding_14: nsg_N20_P14 + P => nsg_N20_P15; k348*nsg_N20_P14*P*c1;
  positive_strand_synthesis_2_21440: nsg_N20_P15 + N => nsg_N20_P15 + psg + N; k349*nsg_N20_P15*N*c1;
  transcription_N_1_51440: nsg_N20_P15 => nsg_N20_P15 + mN; k350*nsg_N20_P15*c1;
  transcription_P_1_101440: nsg_N20_P15 => nsg_N20_P15 + mP; k351*nsg_N20_P15*c1;
  transcription_M_1_151440: nsg_N20_P15 => nsg_N20_P15 + mM; k352*nsg_N20_P15*c1;
  transcription_G_1_201440: nsg_N20_P15 => nsg_N20_P15 + mG; k353*nsg_N20_P15*c1;
  transcription_L_1_251440: nsg_N20_P15 => nsg_N20_P15 + mL; k354*nsg_N20_P15*c1;
  nsg_N20_degradation_351440: nsg_N20_P15 => ; k355*nsg_N20_P15*c1;
  negative_strand_p_binding_15: nsg_N20_P15 + P => nsg_N20_P16; k356*nsg_N20_P15*P*c1;
  positive_strand_synthesis_2_21540: nsg_N20_P16 + N => nsg_N20_P16 + psg + N; k357*nsg_N20_P16*N*c1;
  transcription_N_1_51540: nsg_N20_P16 => nsg_N20_P16 + mN; k358*nsg_N20_P16*c1;
  transcription_P_1_101540: nsg_N20_P16 => nsg_N20_P16 + mP; k359*nsg_N20_P16*c1;
  transcription_M_1_151540: nsg_N20_P16 => nsg_N20_P16 + mM; k360*nsg_N20_P16*c1;
  transcription_G_1_201540: nsg_N20_P16 => nsg_N20_P16 + mG; k361*nsg_N20_P16*c1;
  transcription_L_1_251540: nsg_N20_P16 => nsg_N20_P16 + mL; k362*nsg_N20_P16*c1;
  nsg_N20_degradation_351540: nsg_N20_P16 => ; k363*nsg_N20_P16*c1;
  negative_strand_p_binding_16: nsg_N20_P16 + P => nsg_N20_P17; k364*nsg_N20_P16*P*c1;
  positive_strand_synthesis_2_21640: nsg_N20_P17 + N => nsg_N20_P17 + psg + N; k365*nsg_N20_P17*N*c1;
  transcription_N_1_51640: nsg_N20_P17 => nsg_N20_P17 + mN; k366*nsg_N20_P17*c1;
  transcription_P_1_101640: nsg_N20_P17 => nsg_N20_P17 + mP; k367*nsg_N20_P17*c1;
  transcription_M_1_151640: nsg_N20_P17 => nsg_N20_P17 + mM; k368*nsg_N20_P17*c1;
  transcription_G_1_201640: nsg_N20_P17 => nsg_N20_P17 + mG; k369*nsg_N20_P17*c1;
  transcription_L_1_251640: nsg_N20_P17 => nsg_N20_P17 + mL; k370*nsg_N20_P17*c1;
  nsg_N20_degradation_351640: nsg_N20_P17 => ; k371*nsg_N20_P17*c1;
  negative_strand_p_binding_17: nsg_N20_P17 + P => nsg_N20_P18; k372*nsg_N20_P17*P*c1;
  positive_strand_synthesis_2_21740: nsg_N20_P18 + N => nsg_N20_P18 + psg + N; k373*nsg_N20_P18*N*c1;
  transcription_N_1_51740: nsg_N20_P18 => nsg_N20_P18 + mN; k374*nsg_N20_P18*c1;
  transcription_P_1_101740: nsg_N20_P18 => nsg_N20_P18 + mP; k375*nsg_N20_P18*c1;
  transcription_M_1_151740: nsg_N20_P18 => nsg_N20_P18 + mM; k376*nsg_N20_P18*c1;
  transcription_G_1_201740: nsg_N20_P18 => nsg_N20_P18 + mG; k377*nsg_N20_P18*c1;
  transcription_L_1_251740: nsg_N20_P18 => nsg_N20_P18 + mL; k378*nsg_N20_P18*c1;
  nsg_N20_degradation_351740: nsg_N20_P18 => ; k379*nsg_N20_P18*c1;
  negative_strand_p_binding_18: nsg_N20_P18 + P => nsg_N20_P19; k380*nsg_N20_P18*P*c1;
  positive_strand_synthesis_2_21840: nsg_N20_P19 + N => nsg_N20_P19 + psg + N; k381*nsg_N20_P19*N*c1;
  transcription_N_1_51840: nsg_N20_P19 => nsg_N20_P19 + mN; k382*nsg_N20_P19*c1;
  transcription_P_1_101840: nsg_N20_P19 => nsg_N20_P19 + mP; k383*nsg_N20_P19*c1;
  transcription_M_1_151840: nsg_N20_P19 => nsg_N20_P19 + mM; k384*nsg_N20_P19*c1;
  transcription_G_1_201840: nsg_N20_P19 => nsg_N20_P19 + mG; k385*nsg_N20_P19*c1;
  transcription_L_1_251840: nsg_N20_P19 => nsg_N20_P19 + mL; k386*nsg_N20_P19*c1;
  nsg_N20_degradation_351840: nsg_N20_P19 => ; k387*nsg_N20_P19*c1;
  negative_strand_p_binding_19: nsg_N20_P19 + P => nsg_N20_P20; k388*nsg_N20_P19*P*c1;
  positive_strand_synthesis_2_21940: nsg_N20_P20 + N => nsg_N20_P20 + psg + N; k389*nsg_N20_P20*N*c1;
  transcription_N_1_51940: nsg_N20_P20 => nsg_N20_P20 + mN; k390*nsg_N20_P20*c1;
  transcription_P_1_101940: nsg_N20_P20 => nsg_N20_P20 + mP; k391*nsg_N20_P20*c1;
  transcription_M_1_151940: nsg_N20_P20 => nsg_N20_P20 + mM; k392*nsg_N20_P20*c1;
  transcription_G_1_201940: nsg_N20_P20 => nsg_N20_P20 + mG; k393*nsg_N20_P20*c1;
  transcription_L_1_251940: nsg_N20_P20 => nsg_N20_P20 + mL; k394*nsg_N20_P20*c1;
  nsg_N20_degradation_351940: nsg_N20_P20 => ; k395*nsg_N20_P20*c1;
  negative_strand_l_binding: nsg_N20_P20 + L => nsg_N20_P20_L1; k396*nsg_N20_P20*L*c1;
  positive_strand_synthesis_3_3040: nsg_N20_P20_L1 + N => nsg_N20_P20_L1 + psg + N; k397*nsg_N20_P20_L1*N*c1;
  transcription_N_2_6040: nsg_N20_P20_L1 => nsg_N20_P20_L1 + mN; k398*nsg_N20_P20_L1*c1;
  transcription_P_2_11040: nsg_N20_P20_L1 => nsg_N20_P20_L1 + mP; k399*nsg_N20_P20_L1*c1;
  transcription_M_2_16040: nsg_N20_P20_L1 => nsg_N20_P20_L1 + mM; k400*nsg_N20_P20_L1*c1;
  transcription_G_2_21040: nsg_N20_P20_L1 => nsg_N20_P20_L1 + mG; k401*nsg_N20_P20_L1*c1;
  transcription_L_2_26040: nsg_N20_P20_L1 => nsg_N20_P20_L1 + mL; k402*nsg_N20_P20_L1*c1;
  nsg_N20_P20_degradation_36040: nsg_N20_P20_L1 => ; k403*nsg_N20_P20_L1*c1;
  negative_strand_l_binding_1: nsg_N20_P20_L1 + L => nsg_N20_P20_L2; k404*nsg_N20_P20_L1*L*c1;
  positive_strand_synthesis_3_3140: nsg_N20_P20_L2 + N => nsg_N20_P20_L2 + psg + N; k405*nsg_N20_P20_L2*N*c1;
  transcription_N_2_6140: nsg_N20_P20_L2 => nsg_N20_P20_L2 + mN; k406*nsg_N20_P20_L2*c1;
  transcription_P_2_11140: nsg_N20_P20_L2 => nsg_N20_P20_L2 + mP; k407*nsg_N20_P20_L2*c1;
  transcription_M_2_16140: nsg_N20_P20_L2 => nsg_N20_P20_L2 + mM; k408*nsg_N20_P20_L2*c1;
  transcription_G_2_21140: nsg_N20_P20_L2 => nsg_N20_P20_L2 + mG; k409*nsg_N20_P20_L2*c1;
  transcription_L_2_26140: nsg_N20_P20_L2 => nsg_N20_P20_L2 + mL; k410*nsg_N20_P20_L2*c1;
  nsg_N20_P20_degradation_36140: nsg_N20_P20_L2 => ; k411*nsg_N20_P20_L2*c1;
  negative_strand_l_binding_2: nsg_N20_P20_L2 + L => nsg_N20_P20_L3; k412*nsg_N20_P20_L2*L*c1;
  positive_strand_synthesis_3_3240: nsg_N20_P20_L3 + N => nsg_N20_P20_L3 + psg + N; k413*nsg_N20_P20_L3*N*c1;
  transcription_N_2_6240: nsg_N20_P20_L3 => nsg_N20_P20_L3 + mN; k414*nsg_N20_P20_L3*c1;
  transcription_P_2_11240: nsg_N20_P20_L3 => nsg_N20_P20_L3 + mP; k415*nsg_N20_P20_L3*c1;
  transcription_M_2_16240: nsg_N20_P20_L3 => nsg_N20_P20_L3 + mM; k416*nsg_N20_P20_L3*c1;
  transcription_G_2_21240: nsg_N20_P20_L3 => nsg_N20_P20_L3 + mG; k417*nsg_N20_P20_L3*c1;
  transcription_L_2_26240: nsg_N20_P20_L3 => nsg_N20_P20_L3 + mL; k418*nsg_N20_P20_L3*c1;
  nsg_N20_P20_degradation_36240: nsg_N20_P20_L3 => ; k419*nsg_N20_P20_L3*c1;
  negative_strand_l_binding_3: nsg_N20_P20_L3 + L => nsg_N20_P20_L4; k420*nsg_N20_P20_L3*L*c1;
  positive_strand_synthesis_3_3340: nsg_N20_P20_L4 + N => nsg_N20_P20_L4 + psg + N; k421*nsg_N20_P20_L4*N*c1;
  transcription_N_2_6340: nsg_N20_P20_L4 => nsg_N20_P20_L4 + mN; k422*nsg_N20_P20_L4*c1;
  transcription_P_2_11340: nsg_N20_P20_L4 => nsg_N20_P20_L4 + mP; k423*nsg_N20_P20_L4*c1;
  transcription_M_2_16340: nsg_N20_P20_L4 => nsg_N20_P20_L4 + mM; k424*nsg_N20_P20_L4*c1;
  transcription_G_2_21340: nsg_N20_P20_L4 => nsg_N20_P20_L4 + mG; k425*nsg_N20_P20_L4*c1;
  transcription_L_2_26340: nsg_N20_P20_L4 => nsg_N20_P20_L4 + mL; k426*nsg_N20_P20_L4*c1;
  nsg_N20_P20_degradation_36340: nsg_N20_P20_L4 => ; k427*nsg_N20_P20_L4*c1;
  negative_strand_l_binding_4: nsg_N20_P20_L4 + L => nsg_N20_P20_L5; k428*nsg_N20_P20_L4*L*c1;
  positive_strand_synthesis_3_3440: nsg_N20_P20_L5 + N => nsg_N20_P20_L5 + psg + N; k429*nsg_N20_P20_L5*N*c1;
  transcription_N_2_6440: nsg_N20_P20_L5 => nsg_N20_P20_L5 + mN; k430*nsg_N20_P20_L5*c1;
  transcription_P_2_11440: nsg_N20_P20_L5 => nsg_N20_P20_L5 + mP; k431*nsg_N20_P20_L5*c1;
  transcription_M_2_16440: nsg_N20_P20_L5 => nsg_N20_P20_L5 + mM; k432*nsg_N20_P20_L5*c1;
  transcription_G_2_21440: nsg_N20_P20_L5 => nsg_N20_P20_L5 + mG; k433*nsg_N20_P20_L5*c1;
  transcription_L_2_26440: nsg_N20_P20_L5 => nsg_N20_P20_L5 + mL; k434*nsg_N20_P20_L5*c1;
  nsg_N20_P20_degradation_36440: nsg_N20_P20_L5 => ; k435*nsg_N20_P20_L5*c1;
  negative_strand_l_binding_5: nsg_N20_P20_L5 + L => nsg_N20_P20_L6; k436*nsg_N20_P20_L5*L*c1;
  positive_strand_synthesis_3_3540: nsg_N20_P20_L6 + N => nsg_N20_P20_L6 + psg + N; k437*nsg_N20_P20_L6*N*c1;
  transcription_N_2_6540: nsg_N20_P20_L6 => nsg_N20_P20_L6 + mN; k438*nsg_N20_P20_L6*c1;
  transcription_P_2_11540: nsg_N20_P20_L6 => nsg_N20_P20_L6 + mP; k439*nsg_N20_P20_L6*c1;
  transcription_M_2_16540: nsg_N20_P20_L6 => nsg_N20_P20_L6 + mM; k440*nsg_N20_P20_L6*c1;
  transcription_G_2_21540: nsg_N20_P20_L6 => nsg_N20_P20_L6 + mG; k441*nsg_N20_P20_L6*c1;
  transcription_L_2_26540: nsg_N20_P20_L6 => nsg_N20_P20_L6 + mL; k442*nsg_N20_P20_L6*c1;
  nsg_N20_P20_degradation_36540: nsg_N20_P20_L6 => ; k443*nsg_N20_P20_L6*c1;
  negative_strand_l_binding_6: nsg_N20_P20_L6 + L => nsg_N20_P20_L7; k444*nsg_N20_P20_L6*L*c1;
  positive_strand_synthesis_3_3640: nsg_N20_P20_L7 + N => nsg_N20_P20_L7 + psg + N; k445*nsg_N20_P20_L7*N*c1;
  transcription_N_2_6640: nsg_N20_P20_L7 => nsg_N20_P20_L7 + mN; k446*nsg_N20_P20_L7*c1;
  transcription_P_2_11640: nsg_N20_P20_L7 => nsg_N20_P20_L7 + mP; k447*nsg_N20_P20_L7*c1;
  transcription_M_2_16640: nsg_N20_P20_L7 => nsg_N20_P20_L7 + mM; k448*nsg_N20_P20_L7*c1;
  transcription_G_2_21640: nsg_N20_P20_L7 => nsg_N20_P20_L7 + mG; k449*nsg_N20_P20_L7*c1;
  transcription_L_2_26640: nsg_N20_P20_L7 => nsg_N20_P20_L7 + mL; k450*nsg_N20_P20_L7*c1;
  nsg_N20_P20_degradation_36640: nsg_N20_P20_L7 => ; k451*nsg_N20_P20_L7*c1;
  negative_strand_l_binding_7: nsg_N20_P20_L7 + L => nsg_N20_P20_L8; k452*nsg_N20_P20_L7*L*c1;
  positive_strand_synthesis_3_3740: nsg_N20_P20_L8 + N => nsg_N20_P20_L8 + psg + N; k453*nsg_N20_P20_L8*N*c1;
  transcription_N_2_6740: nsg_N20_P20_L8 => nsg_N20_P20_L8 + mN; k454*nsg_N20_P20_L8*c1;
  transcription_P_2_11740: nsg_N20_P20_L8 => nsg_N20_P20_L8 + mP; k455*nsg_N20_P20_L8*c1;
  transcription_M_2_16740: nsg_N20_P20_L8 => nsg_N20_P20_L8 + mM; k456*nsg_N20_P20_L8*c1;
  transcription_G_2_21740: nsg_N20_P20_L8 => nsg_N20_P20_L8 + mG; k457*nsg_N20_P20_L8*c1;
  transcription_L_2_26740: nsg_N20_P20_L8 => nsg_N20_P20_L8 + mL; k458*nsg_N20_P20_L8*c1;
  nsg_N20_P20_degradation_36740: nsg_N20_P20_L8 => ; k459*nsg_N20_P20_L8*c1;
  negative_strand_l_binding_8: nsg_N20_P20_L8 + L => nsg_N20_P20_L9; k460*nsg_N20_P20_L8*L*c1;
  positive_strand_synthesis_3_3840: nsg_N20_P20_L9 + N => nsg_N20_P20_L9 + psg + N; k461*nsg_N20_P20_L9*N*c1;
  transcription_N_2_6840: nsg_N20_P20_L9 => nsg_N20_P20_L9 + mN; k462*nsg_N20_P20_L9*c1;
  transcription_P_2_11840: nsg_N20_P20_L9 => nsg_N20_P20_L9 + mP; k463*nsg_N20_P20_L9*c1;
  transcription_M_2_16840: nsg_N20_P20_L9 => nsg_N20_P20_L9 + mM; k464*nsg_N20_P20_L9*c1;
  transcription_G_2_21840: nsg_N20_P20_L9 => nsg_N20_P20_L9 + mG; k465*nsg_N20_P20_L9*c1;
  transcription_L_2_26840: nsg_N20_P20_L9 => nsg_N20_P20_L9 + mL; k466*nsg_N20_P20_L9*c1;
  nsg_N20_P20_degradation_36840: nsg_N20_P20_L9 => ; k467*nsg_N20_P20_L9*c1;
  negative_strand_l_binding_9: nsg_N20_P20_L9 + L => nsg_N20_P20_L10; k468*nsg_N20_P20_L9*L*c1;
  positive_strand_synthesis_3_3940: nsg_N20_P20_L10 + N => nsg_N20_P20_L10 + psg + N; k469*nsg_N20_P20_L10*N*c1;
  transcription_N_2_6940: nsg_N20_P20_L10 => nsg_N20_P20_L10 + mN; k470*nsg_N20_P20_L10*c1;
  transcription_P_2_11940: nsg_N20_P20_L10 => nsg_N20_P20_L10 + mP; k471*nsg_N20_P20_L10*c1;
  transcription_M_2_16940: nsg_N20_P20_L10 => nsg_N20_P20_L10 + mM; k472*nsg_N20_P20_L10*c1;
  transcription_G_2_21940: nsg_N20_P20_L10 => nsg_N20_P20_L10 + mG; k473*nsg_N20_P20_L10*c1;
  transcription_L_2_26940: nsg_N20_P20_L10 => nsg_N20_P20_L10 + mL; k474*nsg_N20_P20_L10*c1;
  nsg_N20_P20_degradation_36940: nsg_N20_P20_L10 => ; k475*nsg_N20_P20_L10*c1;
  negative_strand_l_binding_10: nsg_N20_P20_L10 + L => nsg_N20_P20_L11; k476*nsg_N20_P20_L10*L*c1;
  positive_strand_synthesis_3_31040: nsg_N20_P20_L11 + N => nsg_N20_P20_L11 + psg + N; k477*nsg_N20_P20_L11*N*c1;
  transcription_N_2_61040: nsg_N20_P20_L11 => nsg_N20_P20_L11 + mN; k478*nsg_N20_P20_L11*c1;
  transcription_P_2_111040: nsg_N20_P20_L11 => nsg_N20_P20_L11 + mP; k479*nsg_N20_P20_L11*c1;
  transcription_M_2_161040: nsg_N20_P20_L11 => nsg_N20_P20_L11 + mM; k480*nsg_N20_P20_L11*c1;
  transcription_G_2_211040: nsg_N20_P20_L11 => nsg_N20_P20_L11 + mG; k481*nsg_N20_P20_L11*c1;
  transcription_L_2_261040: nsg_N20_P20_L11 => nsg_N20_P20_L11 + mL; k482*nsg_N20_P20_L11*c1;
  nsg_N20_P20_degradation_361040: nsg_N20_P20_L11 => ; k483*nsg_N20_P20_L11*c1;
  negative_strand_l_binding_11: nsg_N20_P20_L11 + L => nsg_N20_P20_L12; k484*nsg_N20_P20_L11*L*c1;
  positive_strand_synthesis_3_31140: nsg_N20_P20_L12 + N => nsg_N20_P20_L12 + psg + N; k485*nsg_N20_P20_L12*N*c1;
  transcription_N_2_61140: nsg_N20_P20_L12 => nsg_N20_P20_L12 + mN; k486*nsg_N20_P20_L12*c1;
  transcription_P_2_111140: nsg_N20_P20_L12 => nsg_N20_P20_L12 + mP; k487*nsg_N20_P20_L12*c1;
  transcription_M_2_161140: nsg_N20_P20_L12 => nsg_N20_P20_L12 + mM; k488*nsg_N20_P20_L12*c1;
  transcription_G_2_211140: nsg_N20_P20_L12 => nsg_N20_P20_L12 + mG; k489*nsg_N20_P20_L12*c1;
  transcription_L_2_261140: nsg_N20_P20_L12 => nsg_N20_P20_L12 + mL; k490*nsg_N20_P20_L12*c1;
  nsg_N20_P20_degradation_361140: nsg_N20_P20_L12 => ; k491*nsg_N20_P20_L12*c1;
  negative_strand_l_binding_12: nsg_N20_P20_L12 + L => nsg_N20_P20_L13; k492*nsg_N20_P20_L12*L*c1;
  positive_strand_synthesis_3_31240: nsg_N20_P20_L13 + N => nsg_N20_P20_L13 + psg + N; k493*nsg_N20_P20_L13*N*c1;
  transcription_N_2_61240: nsg_N20_P20_L13 => nsg_N20_P20_L13 + mN; k494*nsg_N20_P20_L13*c1;
  transcription_P_2_111240: nsg_N20_P20_L13 => nsg_N20_P20_L13 + mP; k495*nsg_N20_P20_L13*c1;
  transcription_M_2_161240: nsg_N20_P20_L13 => nsg_N20_P20_L13 + mM; k496*nsg_N20_P20_L13*c1;
  transcription_G_2_211240: nsg_N20_P20_L13 => nsg_N20_P20_L13 + mG; k497*nsg_N20_P20_L13*c1;
  transcription_L_2_261240: nsg_N20_P20_L13 => nsg_N20_P20_L13 + mL; k498*nsg_N20_P20_L13*c1;
  nsg_N20_P20_degradation_361240: nsg_N20_P20_L13 => ; k499*nsg_N20_P20_L13*c1;
  negative_strand_l_binding_13: nsg_N20_P20_L13 + L => nsg_N20_P20_L14; k500*nsg_N20_P20_L13*L*c1;
  positive_strand_synthesis_3_31340: nsg_N20_P20_L14 + N => nsg_N20_P20_L14 + psg + N; k501*nsg_N20_P20_L14*N*c1;
  transcription_N_2_61340: nsg_N20_P20_L14 => nsg_N20_P20_L14 + mN; k502*nsg_N20_P20_L14*c1;
  transcription_P_2_111340: nsg_N20_P20_L14 => nsg_N20_P20_L14 + mP; k503*nsg_N20_P20_L14*c1;
  transcription_M_2_161340: nsg_N20_P20_L14 => nsg_N20_P20_L14 + mM; k504*nsg_N20_P20_L14*c1;
  transcription_G_2_211340: nsg_N20_P20_L14 => nsg_N20_P20_L14 + mG; k505*nsg_N20_P20_L14*c1;
  transcription_L_2_261340: nsg_N20_P20_L14 => nsg_N20_P20_L14 + mL; k506*nsg_N20_P20_L14*c1;
  nsg_N20_P20_degradation_361340: nsg_N20_P20_L14 => ; k507*nsg_N20_P20_L14*c1;
  negative_strand_l_binding_14: nsg_N20_P20_L14 + L => nsg_N20_P20_L15; k508*nsg_N20_P20_L14*L*c1;
  positive_strand_synthesis_3_31440: nsg_N20_P20_L15 + N => nsg_N20_P20_L15 + psg + N; k509*nsg_N20_P20_L15*N*c1;
  transcription_N_2_61440: nsg_N20_P20_L15 => nsg_N20_P20_L15 + mN; k510*nsg_N20_P20_L15*c1;
  transcription_P_2_111440: nsg_N20_P20_L15 => nsg_N20_P20_L15 + mP; k511*nsg_N20_P20_L15*c1;
  transcription_M_2_161440: nsg_N20_P20_L15 => nsg_N20_P20_L15 + mM; k512*nsg_N20_P20_L15*c1;
  transcription_G_2_211440: nsg_N20_P20_L15 => nsg_N20_P20_L15 + mG; k513*nsg_N20_P20_L15*c1;
  transcription_L_2_261440: nsg_N20_P20_L15 => nsg_N20_P20_L15 + mL; k514*nsg_N20_P20_L15*c1;
  nsg_N20_P20_degradation_361440: nsg_N20_P20_L15 => ; k515*nsg_N20_P20_L15*c1;
  negative_strand_l_binding_15: nsg_N20_P20_L15 + L => nsg_N20_P20_L16; k516*nsg_N20_P20_L15*L*c1;
  positive_strand_synthesis_3_31540: nsg_N20_P20_L16 + N => nsg_N20_P20_L16 + psg + N; k517*nsg_N20_P20_L16*N*c1;
  transcription_N_2_61540: nsg_N20_P20_L16 => nsg_N20_P20_L16 + mN; k518*nsg_N20_P20_L16*c1;
  transcription_P_2_111540: nsg_N20_P20_L16 => nsg_N20_P20_L16 + mP; k519*nsg_N20_P20_L16*c1;
  transcription_M_2_161540: nsg_N20_P20_L16 => nsg_N20_P20_L16 + mM; k520*nsg_N20_P20_L16*c1;
  transcription_G_2_211540: nsg_N20_P20_L16 => nsg_N20_P20_L16 + mG; k521*nsg_N20_P20_L16*c1;
  transcription_L_2_261540: nsg_N20_P20_L16 => nsg_N20_P20_L16 + mL; k522*nsg_N20_P20_L16*c1;
  nsg_N20_P20_degradation_361540: nsg_N20_P20_L16 => ; k523*nsg_N20_P20_L16*c1;
  negative_strand_l_binding_16: nsg_N20_P20_L16 + L => nsg_N20_P20_L17; k524*nsg_N20_P20_L16*L*c1;
  positive_strand_synthesis_3_31640: nsg_N20_P20_L17 + N => nsg_N20_P20_L17 + psg + N; k525*nsg_N20_P20_L17*N*c1;
  transcription_N_2_61640: nsg_N20_P20_L17 => nsg_N20_P20_L17 + mN; k526*nsg_N20_P20_L17*c1;
  transcription_P_2_111640: nsg_N20_P20_L17 => nsg_N20_P20_L17 + mP; k527*nsg_N20_P20_L17*c1;
  transcription_M_2_161640: nsg_N20_P20_L17 => nsg_N20_P20_L17 + mM; k528*nsg_N20_P20_L17*c1;
  transcription_G_2_211640: nsg_N20_P20_L17 => nsg_N20_P20_L17 + mG; k529*nsg_N20_P20_L17*c1;
  transcription_L_2_261640: nsg_N20_P20_L17 => nsg_N20_P20_L17 + mL; k530*nsg_N20_P20_L17*c1;
  nsg_N20_P20_degradation_361640: nsg_N20_P20_L17 => ; k531*nsg_N20_P20_L17*c1;
  negative_strand_l_binding_17: nsg_N20_P20_L17 + L => nsg_N20_P20_L18; k532*nsg_N20_P20_L17*L*c1;
  positive_strand_synthesis_3_31740: nsg_N20_P20_L18 + N => nsg_N20_P20_L18 + psg + N; k533*nsg_N20_P20_L18*N*c1;
  transcription_N_2_61740: nsg_N20_P20_L18 => nsg_N20_P20_L18 + mN; k534*nsg_N20_P20_L18*c1;
  transcription_P_2_111740: nsg_N20_P20_L18 => nsg_N20_P20_L18 + mP; k535*nsg_N20_P20_L18*c1;
  transcription_M_2_161740: nsg_N20_P20_L18 => nsg_N20_P20_L18 + mM; k536*nsg_N20_P20_L18*c1;
  transcription_G_2_211740: nsg_N20_P20_L18 => nsg_N20_P20_L18 + mG; k537*nsg_N20_P20_L18*c1;
  transcription_L_2_261740: nsg_N20_P20_L18 => nsg_N20_P20_L18 + mL; k538*nsg_N20_P20_L18*c1;
  nsg_N20_P20_degradation_361740: nsg_N20_P20_L18 => ; k539*nsg_N20_P20_L18*c1;
  negative_strand_l_binding_18: nsg_N20_P20_L18 + L => nsg_N20_P20_L19; k540*nsg_N20_P20_L18*L*c1;
  positive_strand_synthesis_3_31840: nsg_N20_P20_L19 + N => nsg_N20_P20_L19 + psg + N; k541*nsg_N20_P20_L19*N*c1;
  transcription_N_2_61840: nsg_N20_P20_L19 => nsg_N20_P20_L19 + mN; k542*nsg_N20_P20_L19*c1;
  transcription_P_2_111840: nsg_N20_P20_L19 => nsg_N20_P20_L19 + mP; k543*nsg_N20_P20_L19*c1;
  transcription_M_2_161840: nsg_N20_P20_L19 => nsg_N20_P20_L19 + mM; k544*nsg_N20_P20_L19*c1;
  transcription_G_2_211840: nsg_N20_P20_L19 => nsg_N20_P20_L19 + mG; k545*nsg_N20_P20_L19*c1;
  transcription_L_2_261840: nsg_N20_P20_L19 => nsg_N20_P20_L19 + mL; k546*nsg_N20_P20_L19*c1;
  nsg_N20_P20_degradation_361840: nsg_N20_P20_L19 => ; k547*nsg_N20_P20_L19*c1;
  negative_strand_l_binding_19: nsg_N20_P20_L19 + L => nsg_N20_P20_L20; k548*nsg_N20_P20_L19*L*c1;
  positive_strand_synthesis_3_31940: nsg_N20_P20_L20 + N => nsg_N20_P20_L20 + psg + N; k549*nsg_N20_P20_L20*N*c1;
  transcription_N_2_61940: nsg_N20_P20_L20 => nsg_N20_P20_L20 + mN; k550*nsg_N20_P20_L20*c1;
  transcription_P_2_111940: nsg_N20_P20_L20 => nsg_N20_P20_L20 + mP; k551*nsg_N20_P20_L20*c1;
  transcription_M_2_161940: nsg_N20_P20_L20 => nsg_N20_P20_L20 + mM; k552*nsg_N20_P20_L20*c1;
  transcription_G_2_211940: nsg_N20_P20_L20 => nsg_N20_P20_L20 + mG; k553*nsg_N20_P20_L20*c1;
  transcription_L_2_261940: nsg_N20_P20_L20 => nsg_N20_P20_L20 + mL; k554*nsg_N20_P20_L20*c1;
  nsg_N20_P20_degradation_361940: nsg_N20_P20_L20 => ; k555*nsg_N20_P20_L20*c1;
  transcriptional_silencing: nsg_N20_P20_L20 + M => nsg_N20_P20_L20_M1; k556*nsg_N20_P20_L20*M*c1;
  nsg_N20_P20_L20_degradation_37040: nsg_N20_P20_L20_M1 => ; k557*nsg_N20_P20_L20_M1*c1;
  transcriptional_silencing_1: nsg_N20_P20_L20_M1 + M => nsg_N20_P20_L20_M2; k558*nsg_N20_P20_L20_M1*M*c1;
  nsg_N20_P20_L20_degradation_37140: nsg_N20_P20_L20_M2 => ; k559*nsg_N20_P20_L20_M2*c1;
  transcriptional_silencing_2: nsg_N20_P20_L20_M2 + M => nsg_N20_P20_L20_M3; k560*nsg_N20_P20_L20_M2*M*c1;
  nsg_N20_P20_L20_degradation_37240: nsg_N20_P20_L20_M3 => ; k561*nsg_N20_P20_L20_M3*c1;
  transcriptional_silencing_3: nsg_N20_P20_L20_M3 + M => nsg_N20_P20_L20_M4; k562*nsg_N20_P20_L20_M3*M*c1;
  nsg_N20_P20_L20_degradation_37340: nsg_N20_P20_L20_M4 => ; k563*nsg_N20_P20_L20_M4*c1;
  transcriptional_silencing_4: nsg_N20_P20_L20_M4 + M => nsg_N20_P20_L20_M5; k564*nsg_N20_P20_L20_M4*M*c1;
  nsg_N20_P20_L20_degradation_37440: nsg_N20_P20_L20_M5 => ; k565*nsg_N20_P20_L20_M5*c1;
  transcriptional_silencing_5: nsg_N20_P20_L20_M5 + M => nsg_N20_P20_L20_M6; k566*nsg_N20_P20_L20_M5*M*c1;
  nsg_N20_P20_L20_degradation_37540: nsg_N20_P20_L20_M6 => ; k567*nsg_N20_P20_L20_M6*c1;
  transcriptional_silencing_6: nsg_N20_P20_L20_M6 + M => nsg_N20_P20_L20_M7; k568*nsg_N20_P20_L20_M6*M*c1;
  nsg_N20_P20_L20_degradation_37640: nsg_N20_P20_L20_M7 => ; k569*nsg_N20_P20_L20_M7*c1;
  transcriptional_silencing_7: nsg_N20_P20_L20_M7 + M => nsg_N20_P20_L20_M8; k570*nsg_N20_P20_L20_M7*M*c1;
  nsg_N20_P20_L20_degradation_37740: nsg_N20_P20_L20_M8 => ; k571*nsg_N20_P20_L20_M8*c1;
  transcriptional_silencing_8: nsg_N20_P20_L20_M8 + M => nsg_N20_P20_L20_M9; k572*nsg_N20_P20_L20_M8*M*c1;
  nsg_N20_P20_L20_degradation_37840: nsg_N20_P20_L20_M9 => ; k573*nsg_N20_P20_L20_M9*c1;
  transcriptional_silencing_9: nsg_N20_P20_L20_M9 + M => nsg_N20_P20_L20_M10; k574*nsg_N20_P20_L20_M9*M*c1;
  nsg_N20_P20_L20_degradation_37940: nsg_N20_P20_L20_M10 => ; k575*nsg_N20_P20_L20_M10*c1;
  transcriptional_silencing_10: nsg_N20_P20_L20_M10 + M => nsg_N20_P20_L20_M11; k576*nsg_N20_P20_L20_M10*M*c1;
  nsg_N20_P20_L20_degradation_371040: nsg_N20_P20_L20_M11 => ; k577*nsg_N20_P20_L20_M11*c1;
  transcriptional_silencing_11: nsg_N20_P20_L20_M11 + M => nsg_N20_P20_L20_M12; k578*nsg_N20_P20_L20_M11*M*c1;
  nsg_N20_P20_L20_degradation_371140: nsg_N20_P20_L20_M12 => ; k579*nsg_N20_P20_L20_M12*c1;
  transcriptional_silencing_12: nsg_N20_P20_L20_M12 + M => nsg_N20_P20_L20_M13; k580*nsg_N20_P20_L20_M12*M*c1;
  nsg_N20_P20_L20_degradation_371240: nsg_N20_P20_L20_M13 => ; k581*nsg_N20_P20_L20_M13*c1;
  transcriptional_silencing_13: nsg_N20_P20_L20_M13 + M => nsg_N20_P20_L20_M14; k582*nsg_N20_P20_L20_M13*M*c1;
  nsg_N20_P20_L20_degradation_371340: nsg_N20_P20_L20_M14 => ; k583*nsg_N20_P20_L20_M14*c1;
  transcriptional_silencing_14: nsg_N20_P20_L20_M14 + M => nsg_N20_P20_L20_M15; k584*nsg_N20_P20_L20_M14*M*c1;
  nsg_N20_P20_L20_degradation_371440: nsg_N20_P20_L20_M15 => ; k585*nsg_N20_P20_L20_M15*c1;
  transcriptional_silencing_15: nsg_N20_P20_L20_M15 + M => nsg_N20_P20_L20_M16; k586*nsg_N20_P20_L20_M15*M*c1;
  nsg_N20_P20_L20_degradation_371540: nsg_N20_P20_L20_M16 => ; k587*nsg_N20_P20_L20_M16*c1;
  transcriptional_silencing_16: nsg_N20_P20_L20_M16 + M => nsg_N20_P20_L20_M17; k588*nsg_N20_P20_L20_M16*M*c1;
  nsg_N20_P20_L20_degradation_371640: nsg_N20_P20_L20_M17 => ; k589*nsg_N20_P20_L20_M17*c1;
  transcriptional_silencing_17: nsg_N20_P20_L20_M17 + M => nsg_N20_P20_L20_M18; k590*nsg_N20_P20_L20_M17*M*c1;
  nsg_N20_P20_L20_degradation_371740: nsg_N20_P20_L20_M18 => ; k591*nsg_N20_P20_L20_M18*c1;
  transcriptional_silencing_18: nsg_N20_P20_L20_M18 + M => nsg_N20_P20_L20_M19; k592*nsg_N20_P20_L20_M18*M*c1;
  nsg_N20_P20_L20_degradation_371840: nsg_N20_P20_L20_M19 => ; k593*nsg_N20_P20_L20_M19*c1;
  transcriptional_silencing_19: nsg_N20_P20_L20_M19 + M => nsg_N20_P20_L20_M20; k594*nsg_N20_P20_L20_M19*M*c1;
  nsg_N20_P20_L20_degradation_371940: nsg_N20_P20_L20_M20 => ; k595*nsg_N20_P20_L20_M20*c1;
  Virion_Assembly: nsg_N20_P20_L20_M20 + G => nsg_N20_P20_L20_M20_G1; k596*nsg_N20_P20_L20_M20*G*c1;
  nsg_N20_P20_L20_M20_degradation_38040: nsg_N20_P20_L20_M20_G1 => ; k597*nsg_N20_P20_L20_M20_G1*c1;
  Virion_Assembly_1: nsg_N20_P20_L20_M20_G1 + G => nsg_N20_P20_L20_M20_G2; k598*nsg_N20_P20_L20_M20_G1*G*c1;
  nsg_N20_P20_L20_M20_degradation_38140: nsg_N20_P20_L20_M20_G2 => ; k599*nsg_N20_P20_L20_M20_G2*c1;
  Virion_Assembly_2: nsg_N20_P20_L20_M20_G2 + G => nsg_N20_P20_L20_M20_G3; k600*nsg_N20_P20_L20_M20_G2*G*c1;
  nsg_N20_P20_L20_M20_degradation_38240: nsg_N20_P20_L20_M20_G3 => ; k601*nsg_N20_P20_L20_M20_G3*c1;
  Virion_Assembly_3: nsg_N20_P20_L20_M20_G3 + G => nsg_N20_P20_L20_M20_G4; k602*nsg_N20_P20_L20_M20_G3*G*c1;
  nsg_N20_P20_L20_M20_degradation_38340: nsg_N20_P20_L20_M20_G4 => ; k603*nsg_N20_P20_L20_M20_G4*c1;
  Virion_Assembly_4: nsg_N20_P20_L20_M20_G4 + G => nsg_N20_P20_L20_M20_G5; k604*nsg_N20_P20_L20_M20_G4*G*c1;
  nsg_N20_P20_L20_M20_degradation_38440: nsg_N20_P20_L20_M20_G5 => ; k605*nsg_N20_P20_L20_M20_G5*c1;
  Virion_Assembly_5: nsg_N20_P20_L20_M20_G5 + G => nsg_N20_P20_L20_M20_G6; k606*nsg_N20_P20_L20_M20_G5*G*c1;
  nsg_N20_P20_L20_M20_degradation_38540: nsg_N20_P20_L20_M20_G6 => ; k607*nsg_N20_P20_L20_M20_G6*c1;
  Virion_Assembly_6: nsg_N20_P20_L20_M20_G6 + G => nsg_N20_P20_L20_M20_G7; k608*nsg_N20_P20_L20_M20_G6*G*c1;
  nsg_N20_P20_L20_M20_degradation_38640: nsg_N20_P20_L20_M20_G7 => ; k609*nsg_N20_P20_L20_M20_G7*c1;
  Virion_Assembly_7: nsg_N20_P20_L20_M20_G7 + G => nsg_N20_P20_L20_M20_G8; k610*nsg_N20_P20_L20_M20_G7*G*c1;
  nsg_N20_P20_L20_M20_degradation_38740: nsg_N20_P20_L20_M20_G8 => ; k611*nsg_N20_P20_L20_M20_G8*c1;
  Virion_Assembly_8: nsg_N20_P20_L20_M20_G8 + G => nsg_N20_P20_L20_M20_G9; k612*nsg_N20_P20_L20_M20_G8*G*c1;
  nsg_N20_P20_L20_M20_degradation_38840: nsg_N20_P20_L20_M20_G9 => ; k613*nsg_N20_P20_L20_M20_G9*c1;
  Virion_Assembly_9: nsg_N20_P20_L20_M20_G9 + G => nsg_N20_P20_L20_M20_G10; k614*nsg_N20_P20_L20_M20_G9*G*c1;
  nsg_N20_P20_L20_M20_degradation_38940: nsg_N20_P20_L20_M20_G10 => ; k615*nsg_N20_P20_L20_M20_G10*c1;
  Virion_Assembly_10: nsg_N20_P20_L20_M20_G10 + G => nsg_N20_P20_L20_M20_G11; k616*nsg_N20_P20_L20_M20_G10*G*c1;
  nsg_N20_P20_L20_M20_degradation_381040: nsg_N20_P20_L20_M20_G11 => ; k617*nsg_N20_P20_L20_M20_G11*c1;
  Virion_Assembly_11: nsg_N20_P20_L20_M20_G11 + G => nsg_N20_P20_L20_M20_G12; k618*nsg_N20_P20_L20_M20_G11*G*c1;
  nsg_N20_P20_L20_M20_degradation_381140: nsg_N20_P20_L20_M20_G12 => ; k619*nsg_N20_P20_L20_M20_G12*c1;
  Virion_Assembly_12: nsg_N20_P20_L20_M20_G12 + G => nsg_N20_P20_L20_M20_G13; k620*nsg_N20_P20_L20_M20_G12*G*c1;
  nsg_N20_P20_L20_M20_degradation_381240: nsg_N20_P20_L20_M20_G13 => ; k621*nsg_N20_P20_L20_M20_G13*c1;
  Virion_Assembly_13: nsg_N20_P20_L20_M20_G13 + G => nsg_N20_P20_L20_M20_G14; k622*nsg_N20_P20_L20_M20_G13*G*c1;
  nsg_N20_P20_L20_M20_degradation_381340: nsg_N20_P20_L20_M20_G14 => ; k623*nsg_N20_P20_L20_M20_G14*c1;
  Virion_Assembly_14: nsg_N20_P20_L20_M20_G14 + G => nsg_N20_P20_L20_M20_G15; k624*nsg_N20_P20_L20_M20_G14*G*c1;
  nsg_N20_P20_L20_M20_degradation_381440: nsg_N20_P20_L20_M20_G15 => ; k625*nsg_N20_P20_L20_M20_G15*c1;
  Virion_Assembly_15: nsg_N20_P20_L20_M20_G15 + G => nsg_N20_P20_L20_M20_G16; k626*nsg_N20_P20_L20_M20_G15*G*c1;
  nsg_N20_P20_L20_M20_degradation_381540: nsg_N20_P20_L20_M20_G16 => ; k627*nsg_N20_P20_L20_M20_G16*c1;
  Virion_Assembly_16: nsg_N20_P20_L20_M20_G16 + G => nsg_N20_P20_L20_M20_G17; k628*nsg_N20_P20_L20_M20_G16*G*c1;
  nsg_N20_P20_L20_M20_degradation_381640: nsg_N20_P20_L20_M20_G17 => ; k629*nsg_N20_P20_L20_M20_G17*c1;
  Virion_Assembly_17: nsg_N20_P20_L20_M20_G17 + G => nsg_N20_P20_L20_M20_G18; k630*nsg_N20_P20_L20_M20_G17*G*c1;
  nsg_N20_P20_L20_M20_degradation_381740: nsg_N20_P20_L20_M20_G18 => ; k631*nsg_N20_P20_L20_M20_G18*c1;
  Virion_Assembly_18: nsg_N20_P20_L20_M20_G18 + G => nsg_N20_P20_L20_M20_G19; k632*nsg_N20_P20_L20_M20_G18*G*c1;
  nsg_N20_P20_L20_M20_degradation_381840: nsg_N20_P20_L20_M20_G19 => ; k633*nsg_N20_P20_L20_M20_G19*c1;
  Virion_Assembly_19: nsg_N20_P20_L20_M20_G19 + G => nsg_N20_P20_L20_M20_G20; k634*nsg_N20_P20_L20_M20_G19*G*c1;
  nsg_N20_P20_L20_M20_degradation_381940: nsg_N20_P20_L20_M20_G20 => ; k635*nsg_N20_P20_L20_M20_G20*c1;

  // Unit definitions:
  unit per_second = 1 / second;
end
