// SBML level 3 version 1

model main()
  // model units - substance: item, time: second, extent: item

  // Compartments:
  compartment c1 = 1 litre;

  // Species:
  species nsg in c1 = 0;  // substance in mole
  species N in c1 = 0;  // substance in mole
  species nsg_N10_P10_L10 in c1 = 0;  // substance in mole
  species nsg_N10_P10 in c1 = 0;  // substance in mole
  species nsg_N10 in c1 = 1/c1;  // substance in mole
  species psg in c1 = 0;  // substance in mole
  species psg_N10 in c1 = 0;  // substance in mole
  species L in c1 = 10/c1;  // substance in mole
  species P in c1 = 10/c1;  // substance in mole
  species M in c1 = 0;  // substance in mole
  species G in c1 = 10/c1;  // substance in mole
  species mL in c1 = 0;  // substance in mole
  species mM in c1 = 0;  // substance in mole
  species mP in c1 = 0;  // substance in mole
  species mG in c1 = 0;  // substance in mole
  species mN in c1 = 0;  // substance in mole
  species nsg_N10_P10_L10_M10 in c1 = 0;  // substance in mole
  species nsg_N10_P10_L10_M10_G10 in c1 = 0;  // substance in mole
  species V in c1 = 0;  // substance in mole
  species nsg_N1 in c1 = 0;  // substance in mole
  species nsg_N2 in c1 = 0;  // substance in mole
  species nsg_N3 in c1 = 0;  // substance in mole
  species nsg_N4 in c1 = 0;  // substance in mole
  species nsg_N5 in c1 = 0;  // substance in mole
  species nsg_N6 in c1 = 0;  // substance in mole
  species nsg_N7 in c1 = 0;  // substance in mole
  species nsg_N8 in c1 = 0;  // substance in mole
  species nsg_N9 in c1 = 0;  // substance in mole
  species psg_N1 in c1 = 0;  // substance in mole
  species psg_N2 in c1 = 0;  // substance in mole
  species psg_N3 in c1 = 0;  // substance in mole
  species psg_N4 in c1 = 0;  // substance in mole
  species psg_N5 in c1 = 0;  // substance in mole
  species psg_N6 in c1 = 0;  // substance in mole
  species psg_N7 in c1 = 0;  // substance in mole
  species psg_N8 in c1 = 0;  // substance in mole
  species psg_N9 in c1 = 0;  // substance in mole
  species nsg_N10_P1 in c1 = 0;  // substance in mole
  species nsg_N10_P2 in c1 = 0;  // substance in mole
  species nsg_N10_P3 in c1 = 0;  // substance in mole
  species nsg_N10_P4 in c1 = 0;  // substance in mole
  species nsg_N10_P5 in c1 = 0;  // substance in mole
  species nsg_N10_P6 in c1 = 0;  // substance in mole
  species nsg_N10_P7 in c1 = 0;  // substance in mole
  species nsg_N10_P8 in c1 = 0;  // substance in mole
  species nsg_N10_P9 in c1 = 0;  // substance in mole
  species nsg_N10_P10_L1 in c1 = 0;  // substance in mole
  species nsg_N10_P10_L2 in c1 = 0;  // substance in mole
  species nsg_N10_P10_L3 in c1 = 0;  // substance in mole
  species nsg_N10_P10_L4 in c1 = 0;  // substance in mole
  species nsg_N10_P10_L5 in c1 = 0;  // substance in mole
  species nsg_N10_P10_L6 in c1 = 0;  // substance in mole
  species nsg_N10_P10_L7 in c1 = 0;  // substance in mole
  species nsg_N10_P10_L8 in c1 = 0;  // substance in mole
  species nsg_N10_P10_L9 in c1 = 0;  // substance in mole
  species nsg_N10_P10_L10_M1 in c1 = 0;  // substance in mole
  species nsg_N10_P10_L10_M2 in c1 = 0;  // substance in mole
  species nsg_N10_P10_L10_M3 in c1 = 0;  // substance in mole
  species nsg_N10_P10_L10_M4 in c1 = 0;  // substance in mole
  species nsg_N10_P10_L10_M5 in c1 = 0;  // substance in mole
  species nsg_N10_P10_L10_M6 in c1 = 0;  // substance in mole
  species nsg_N10_P10_L10_M7 in c1 = 0;  // substance in mole
  species nsg_N10_P10_L10_M8 in c1 = 0;  // substance in mole
  species nsg_N10_P10_L10_M9 in c1 = 0;  // substance in mole
  species nsg_N10_P10_L10_M10_G1 in c1 = 0;  // substance in mole
  species nsg_N10_P10_L10_M10_G2 in c1 = 0;  // substance in mole
  species nsg_N10_P10_L10_M10_G3 in c1 = 0;  // substance in mole
  species nsg_N10_P10_L10_M10_G4 in c1 = 0;  // substance in mole
  species nsg_N10_P10_L10_M10_G5 in c1 = 0;  // substance in mole
  species nsg_N10_P10_L10_M10_G6 in c1 = 0;  // substance in mole
  species nsg_N10_P10_L10_M10_G7 in c1 = 0;  // substance in mole
  species nsg_N10_P10_L10_M10_G8 in c1 = 0;  // substance in mole
  species nsg_N10_P10_L10_M10_G9 in c1 = 0;  // substance in mole

  // Parameters:
  k0 = 0.0755 per_second;
  k1 = 2.78219e-8 per_second;
  k2 = 0.0755 per_second;
  k3 = 3.00429e-9 per_second;
  k4 = 0.0755 per_second;
  k5 = 8.21468e-8 per_second;
  k6 = 0.0755 per_second;
  k7 = 4.73029e-8 per_second;
  k8 = 0.0755 per_second;
  k9 = 5.5e-7 per_second;
  k10 = 0.00019 per_second;
  k11 = 0.00019 per_second;
  k12 = 0.00019 per_second;
  k13 = 0.00019 per_second;
  k14 = 0.00019 per_second;
  k15 = 0.0461 per_second;
  k16 = 0.0461 per_second;
  k17 = 0 per_second;
  k18 = 0.00160781533 per_second;
  k19 = 0.001125471 per_second;
  k20 = 0.0007878297 per_second;
  k21 = 0.000551481 per_second;
  k22 = 5.51481e-5 per_second;
  k23 = 1.9e-5 per_second;
  k24 = 0.0461 per_second;
  k25 = 0 per_second;
  k26 = 0.00160781533 per_second;
  k27 = 0.001125471 per_second;
  k28 = 0.0007878297 per_second;
  k29 = 0.000551481 per_second;
  k30 = 5.51481e-5 per_second;
  k31 = 1.9e-5 per_second;
  k32 = 0.0461 per_second;
  k33 = 0 per_second;
  k34 = 0.00160781533 per_second;
  k35 = 0.001125471 per_second;
  k36 = 0.0007878297 per_second;
  k37 = 0.000551481 per_second;
  k38 = 5.51481e-5 per_second;
  k39 = 1.9e-5 per_second;
  k40 = 0.0461 per_second;
  k41 = 0 per_second;
  k42 = 0.00160781533 per_second;
  k43 = 0.001125471 per_second;
  k44 = 0.0007878297 per_second;
  k45 = 0.000551481 per_second;
  k46 = 5.51481e-5 per_second;
  k47 = 1.9e-5 per_second;
  k48 = 0.0461 per_second;
  k49 = 0 per_second;
  k50 = 0.00160781533 per_second;
  k51 = 0.001125471 per_second;
  k52 = 0.0007878297 per_second;
  k53 = 0.000551481 per_second;
  k54 = 5.51481e-5 per_second;
  k55 = 1.9e-5 per_second;
  k56 = 0.0461 per_second;
  k57 = 0 per_second;
  k58 = 0.00160781533 per_second;
  k59 = 0.001125471 per_second;
  k60 = 0.0007878297 per_second;
  k61 = 0.000551481 per_second;
  k62 = 5.51481e-5 per_second;
  k63 = 1.9e-5 per_second;
  k64 = 0.0461 per_second;
  k65 = 0 per_second;
  k66 = 0.00160781533 per_second;
  k67 = 0.001125471 per_second;
  k68 = 0.0007878297 per_second;
  k69 = 0.000551481 per_second;
  k70 = 5.51481e-5 per_second;
  k71 = 1.9e-5 per_second;
  k72 = 0.0461 per_second;
  k73 = 0 per_second;
  k74 = 0.00160781533 per_second;
  k75 = 0.001125471 per_second;
  k76 = 0.0007878297 per_second;
  k77 = 0.000551481 per_second;
  k78 = 5.51481e-5 per_second;
  k79 = 1.9e-5 per_second;
  k80 = 0.0461 per_second;
  k81 = 0 per_second;
  k82 = 0.00160781533 per_second;
  k83 = 0.001125471 per_second;
  k84 = 0.0007878297 per_second;
  k85 = 0.000551481 per_second;
  k86 = 5.51481e-5 per_second;
  k87 = 1.9e-5 per_second;
  k88 = 0.0461 per_second;
  k89 = 0 per_second;
  k90 = 0.00160781533 per_second;
  k91 = 0.001125471 per_second;
  k92 = 0.0007878297 per_second;
  k93 = 0.000551481 per_second;
  k94 = 5.51481e-5 per_second;
  k95 = 1.9e-5 per_second;
  k96 = 0.0461 per_second;
  k97 = 0 per_second;
  k98 = 1.9e-5 per_second;
  k99 = 0.0461 per_second;
  k100 = 0 per_second;
  k101 = 1.9e-5 per_second;
  k102 = 0.0461 per_second;
  k103 = 0 per_second;
  k104 = 1.9e-5 per_second;
  k105 = 0.0461 per_second;
  k106 = 0 per_second;
  k107 = 1.9e-5 per_second;
  k108 = 0.0461 per_second;
  k109 = 0 per_second;
  k110 = 1.9e-5 per_second;
  k111 = 0.0461 per_second;
  k112 = 0 per_second;
  k113 = 1.9e-5 per_second;
  k114 = 0.0461 per_second;
  k115 = 0 per_second;
  k116 = 1.9e-5 per_second;
  k117 = 0.0461 per_second;
  k118 = 0 per_second;
  k119 = 1.9e-5 per_second;
  k120 = 0.0461 per_second;
  k121 = 0 per_second;
  k122 = 1.9e-5 per_second;
  k123 = 0.0461 per_second;
  k124 = 0 per_second;
  k125 = 1.9e-5 per_second;
  k126 = 0.0461 per_second;
  k127 = 0 per_second;
  k128 = 0.00160781533 per_second;
  k129 = 0.001125471 per_second;
  k130 = 0.0007878297 per_second;
  k131 = 0.000551481 per_second;
  k132 = 5.51481e-5 per_second;
  k133 = 1.9e-5 per_second;
  k134 = 0.0461 per_second;
  k135 = 0 per_second;
  k136 = 0.00160781533 per_second;
  k137 = 0.001125471 per_second;
  k138 = 0.0007878297 per_second;
  k139 = 0.000551481 per_second;
  k140 = 5.51481e-5 per_second;
  k141 = 1.9e-5 per_second;
  k142 = 0.0461 per_second;
  k143 = 0 per_second;
  k144 = 0.00160781533 per_second;
  k145 = 0.001125471 per_second;
  k146 = 0.0007878297 per_second;
  k147 = 0.000551481 per_second;
  k148 = 5.51481e-5 per_second;
  k149 = 1.9e-5 per_second;
  k150 = 0.0461 per_second;
  k151 = 0 per_second;
  k152 = 0.00160781533 per_second;
  k153 = 0.001125471 per_second;
  k154 = 0.0007878297 per_second;
  k155 = 0.000551481 per_second;
  k156 = 5.51481e-5 per_second;
  k157 = 1.9e-5 per_second;
  k158 = 0.0461 per_second;
  k159 = 0 per_second;
  k160 = 0.00160781533 per_second;
  k161 = 0.001125471 per_second;
  k162 = 0.0007878297 per_second;
  k163 = 0.000551481 per_second;
  k164 = 5.51481e-5 per_second;
  k165 = 1.9e-5 per_second;
  k166 = 0.0461 per_second;
  k167 = 0 per_second;
  k168 = 0.00160781533 per_second;
  k169 = 0.001125471 per_second;
  k170 = 0.0007878297 per_second;
  k171 = 0.000551481 per_second;
  k172 = 5.51481e-5 per_second;
  k173 = 1.9e-5 per_second;
  k174 = 0.0461 per_second;
  k175 = 0 per_second;
  k176 = 0.00160781533 per_second;
  k177 = 0.001125471 per_second;
  k178 = 0.0007878297 per_second;
  k179 = 0.000551481 per_second;
  k180 = 5.51481e-5 per_second;
  k181 = 1.9e-5 per_second;
  k182 = 0.0461 per_second;
  k183 = 0 per_second;
  k184 = 0.00160781533 per_second;
  k185 = 0.001125471 per_second;
  k186 = 0.0007878297 per_second;
  k187 = 0.000551481 per_second;
  k188 = 5.51481e-5 per_second;
  k189 = 1.9e-5 per_second;
  k190 = 0.0461 per_second;
  k191 = 0 per_second;
  k192 = 0.00160781533 per_second;
  k193 = 0.001125471 per_second;
  k194 = 0.0007878297 per_second;
  k195 = 0.000551481 per_second;
  k196 = 5.51481e-5 per_second;
  k197 = 1.9e-5 per_second;
  k198 = 0.0461 per_second;
  k199 = 0 per_second;
  k200 = 0.00160781533 per_second;
  k201 = 0.001125471 per_second;
  k202 = 0.0007878297 per_second;
  k203 = 0.000551481 per_second;
  k204 = 5.51481e-5 per_second;
  k205 = 1.9e-5 per_second;
  k206 = 0.0461 per_second;
  k207 = 0 per_second;
  k208 = 0.00160781533 per_second;
  k209 = 0.001125471 per_second;
  k210 = 0.0007878297 per_second;
  k211 = 0.000551481 per_second;
  k212 = 5.51481e-5 per_second;
  k213 = 1.9e-5 per_second;
  k214 = 0.0461 per_second;
  k215 = 0 per_second;
  k216 = 0.00160781533 per_second;
  k217 = 0.001125471 per_second;
  k218 = 0.0007878297 per_second;
  k219 = 0.000551481 per_second;
  k220 = 5.51481e-5 per_second;
  k221 = 1.9e-5 per_second;
  k222 = 0.0461 per_second;
  k223 = 0 per_second;
  k224 = 0.00160781533 per_second;
  k225 = 0.001125471 per_second;
  k226 = 0.0007878297 per_second;
  k227 = 0.000551481 per_second;
  k228 = 5.51481e-5 per_second;
  k229 = 1.9e-5 per_second;
  k230 = 0.0461 per_second;
  k231 = 0 per_second;
  k232 = 0.00160781533 per_second;
  k233 = 0.001125471 per_second;
  k234 = 0.0007878297 per_second;
  k235 = 0.000551481 per_second;
  k236 = 5.51481e-5 per_second;
  k237 = 1.9e-5 per_second;
  k238 = 0.0461 per_second;
  k239 = 0 per_second;
  k240 = 0.00160781533 per_second;
  k241 = 0.001125471 per_second;
  k242 = 0.0007878297 per_second;
  k243 = 0.000551481 per_second;
  k244 = 5.51481e-5 per_second;
  k245 = 1.9e-5 per_second;
  k246 = 0.0461 per_second;
  k247 = 0 per_second;
  k248 = 0.00160781533 per_second;
  k249 = 0.001125471 per_second;
  k250 = 0.0007878297 per_second;
  k251 = 0.000551481 per_second;
  k252 = 5.51481e-5 per_second;
  k253 = 1.9e-5 per_second;
  k254 = 0.0461 per_second;
  k255 = 0 per_second;
  k256 = 0.00160781533 per_second;
  k257 = 0.001125471 per_second;
  k258 = 0.0007878297 per_second;
  k259 = 0.000551481 per_second;
  k260 = 5.51481e-5 per_second;
  k261 = 1.9e-5 per_second;
  k262 = 0.0461 per_second;
  k263 = 0 per_second;
  k264 = 0.00160781533 per_second;
  k265 = 0.001125471 per_second;
  k266 = 0.0007878297 per_second;
  k267 = 0.000551481 per_second;
  k268 = 5.51481e-5 per_second;
  k269 = 1.9e-5 per_second;
  k270 = 0.0461 per_second;
  k271 = 0 per_second;
  k272 = 0.00160781533 per_second;
  k273 = 0.001125471 per_second;
  k274 = 0.0007878297 per_second;
  k275 = 0.000551481 per_second;
  k276 = 5.51481e-5 per_second;
  k277 = 1.9e-5 per_second;
  k278 = 0.0461 per_second;
  k279 = 0 per_second;
  k280 = 0.00160781533 per_second;
  k281 = 0.001125471 per_second;
  k282 = 0.0007878297 per_second;
  k283 = 0.000551481 per_second;
  k284 = 5.51481e-5 per_second;
  k285 = 1.9e-5 per_second;
  k286 = 0.0461 per_second;
  k287 = 1.9e-5 per_second;
  k288 = 0.0461 per_second;
  k289 = 1.9e-5 per_second;
  k290 = 0.0461 per_second;
  k291 = 1.9e-5 per_second;
  k292 = 0.0461 per_second;
  k293 = 1.9e-5 per_second;
  k294 = 0.0461 per_second;
  k295 = 1.9e-5 per_second;
  k296 = 0.0461 per_second;
  k297 = 1.9e-5 per_second;
  k298 = 0.0461 per_second;
  k299 = 1.9e-5 per_second;
  k300 = 0.0461 per_second;
  k301 = 1.9e-5 per_second;
  k302 = 0.0461 per_second;
  k303 = 1.9e-5 per_second;
  k304 = 0.0461 per_second;
  k305 = 1.9e-5 per_second;
  k306 = 0.0461 per_second;
  k307 = 1.9e-5 per_second;
  k308 = 0.0461 per_second;
  k309 = 1.9e-5 per_second;
  k310 = 0.0461 per_second;
  k311 = 1.9e-5 per_second;
  k312 = 0.0461 per_second;
  k313 = 1.9e-5 per_second;
  k314 = 0.0461 per_second;
  k315 = 1.9e-5 per_second;
  k316 = 0.0461 per_second;
  k317 = 1.9e-5 per_second;
  k318 = 0.0461 per_second;
  k319 = 1.9e-5 per_second;
  k320 = 0.0461 per_second;
  k321 = 1.9e-5 per_second;
  k322 = 0.0461 per_second;
  k323 = 1.9e-5 per_second;
  k324 = 0.0461 per_second;
  k325 = 1.9e-5 per_second;

  // Reactions:
  translation_N: mN => mN + N; k0*mN*c1;
  N_degradation: N => ; k1*N*c1;
  translation_P: mP => mP + P; k2*mP*c1;
  P_degradation: P => ; k3*P*c1;
  translation_M: mM => mM + M; k4*mM*c1;
  M_degradation: M => ; k5*M*c1;
  translation_G: mG => mG + G; k6*mG*c1;
  G_degradation: G => ; k7*G*c1;
  translation_L: mL => mL + L; k8*mL*c1;
  L_degradation: L => ; k9*L*c1;
  mN_degradation: mN => ; k10*mN*c1;
  mP_degradation: mP => ; k11*mP*c1;
  mM_degradation: mM => ; k12*mM*c1;
  mG_degradation: mG => ; k13*mG*c1;
  mL_degradation: mL => ; k14*mL*c1;
  Virion_Budding: nsg_N10_P10_L10_M10_G10 => V; k15*nsg_N10_P10_L10_M10_G10*c1;
  negative_strand_encapsidation: nsg + N => nsg_N1; k16*nsg*N*c1;
  positive_strand_synthesis_1_1040: nsg_N1 + N => nsg_N1 + psg + N; k17*nsg_N1*N*c1;
  transcription_N_0_4040: nsg_N1 => nsg_N1 + mN; k18*nsg_N1*c1;
  transcription_P_0_9040: nsg_N1 => nsg_N1 + mN + mP; k19*nsg_N1*c1;
  transcription_M_0_14040: nsg_N1 => nsg_N1 + mM; k20*nsg_N1*c1;
  transcription_G_0_19040: nsg_N1 => nsg_N1 + mG; k21*nsg_N1*c1;
  transcription_L_0_24040: nsg_N1 => nsg_N1 + mL; k22*nsg_N1*c1;
  nsg_degradation_34040: nsg_N1 => ; k23*nsg_N1*c1;
  negative_strand_encapsidation_1: nsg_N1 + N => nsg_N2; k24*nsg_N1*N*c1;
  positive_strand_synthesis_1_1140: nsg_N2 + N => nsg_N2 + psg + N; k25*nsg_N2*N*c1;
  transcription_N_0_4140: nsg_N2 => nsg_N2 + mN; k26*nsg_N2*c1;
  transcription_P_0_9140: nsg_N2 => nsg_N2 + mN + mP; k27*nsg_N2*c1;
  transcription_M_0_14140: nsg_N2 => nsg_N2 + mM; k28*nsg_N2*c1;
  transcription_G_0_19140: nsg_N2 => nsg_N2 + mG; k29*nsg_N2*c1;
  transcription_L_0_24140: nsg_N2 => nsg_N2 + mL; k30*nsg_N2*c1;
  nsg_degradation_34140: nsg_N2 => ; k31*nsg_N2*c1;
  negative_strand_encapsidation_2: nsg_N2 + N => nsg_N3; k32*nsg_N2*N*c1;
  positive_strand_synthesis_1_1240: nsg_N3 + N => nsg_N3 + psg + N; k33*nsg_N3*N*c1;
  transcription_N_0_4240: nsg_N3 => nsg_N3 + mN; k34*nsg_N3*c1;
  transcription_P_0_9240: nsg_N3 => nsg_N3 + mN + mP; k35*nsg_N3*c1;
  transcription_M_0_14240: nsg_N3 => nsg_N3 + mM; k36*nsg_N3*c1;
  transcription_G_0_19240: nsg_N3 => nsg_N3 + mG; k37*nsg_N3*c1;
  transcription_L_0_24240: nsg_N3 => nsg_N3 + mL; k38*nsg_N3*c1;
  nsg_degradation_34240: nsg_N3 => ; k39*nsg_N3*c1;
  negative_strand_encapsidation_3: nsg_N3 + N => nsg_N4; k40*nsg_N3*N*c1;
  positive_strand_synthesis_1_1340: nsg_N4 + N => nsg_N4 + psg + N; k41*nsg_N4*N*c1;
  transcription_N_0_4340: nsg_N4 => nsg_N4 + mN; k42*nsg_N4*c1;
  transcription_P_0_9340: nsg_N4 => nsg_N4 + mN + mP; k43*nsg_N4*c1;
  transcription_M_0_14340: nsg_N4 => nsg_N4 + mM; k44*nsg_N4*c1;
  transcription_G_0_19340: nsg_N4 => nsg_N4 + mG; k45*nsg_N4*c1;
  transcription_L_0_24340: nsg_N4 => nsg_N4 + mL; k46*nsg_N4*c1;
  nsg_degradation_34340: nsg_N4 => ; k47*nsg_N4*c1;
  negative_strand_encapsidation_4: nsg_N4 + N => nsg_N5; k48*nsg_N4*N*c1;
  positive_strand_synthesis_1_1440: nsg_N5 + N => nsg_N5 + psg + N; k49*nsg_N5*N*c1;
  transcription_N_0_4440: nsg_N5 => nsg_N5 + mN; k50*nsg_N5*c1;
  transcription_P_0_9440: nsg_N5 => nsg_N5 + mN + mP; k51*nsg_N5*c1;
  transcription_M_0_14440: nsg_N5 => nsg_N5 + mM; k52*nsg_N5*c1;
  transcription_G_0_19440: nsg_N5 => nsg_N5 + mG; k53*nsg_N5*c1;
  transcription_L_0_24440: nsg_N5 => nsg_N5 + mL; k54*nsg_N5*c1;
  nsg_degradation_34440: nsg_N5 => ; k55*nsg_N5*c1;
  negative_strand_encapsidation_5: nsg_N5 + N => nsg_N6; k56*nsg_N5*N*c1;
  positive_strand_synthesis_1_1540: nsg_N6 + N => nsg_N6 + psg + N; k57*nsg_N6*N*c1;
  transcription_N_0_4540: nsg_N6 => nsg_N6 + mN; k58*nsg_N6*c1;
  transcription_P_0_9540: nsg_N6 => nsg_N6 + mN + mP; k59*nsg_N6*c1;
  transcription_M_0_14540: nsg_N6 => nsg_N6 + mM; k60*nsg_N6*c1;
  transcription_G_0_19540: nsg_N6 => nsg_N6 + mG; k61*nsg_N6*c1;
  transcription_L_0_24540: nsg_N6 => nsg_N6 + mL; k62*nsg_N6*c1;
  nsg_degradation_34540: nsg_N6 => ; k63*nsg_N6*c1;
  negative_strand_encapsidation_6: nsg_N6 + N => nsg_N7; k64*nsg_N6*N*c1;
  positive_strand_synthesis_1_1640: nsg_N7 + N => nsg_N7 + psg + N; k65*nsg_N7*N*c1;
  transcription_N_0_4640: nsg_N7 => nsg_N7 + mN; k66*nsg_N7*c1;
  transcription_P_0_9640: nsg_N7 => nsg_N7 + mN + mP; k67*nsg_N7*c1;
  transcription_M_0_14640: nsg_N7 => nsg_N7 + mM; k68*nsg_N7*c1;
  transcription_G_0_19640: nsg_N7 => nsg_N7 + mG; k69*nsg_N7*c1;
  transcription_L_0_24640: nsg_N7 => nsg_N7 + mL; k70*nsg_N7*c1;
  nsg_degradation_34640: nsg_N7 => ; k71*nsg_N7*c1;
  negative_strand_encapsidation_7: nsg_N7 + N => nsg_N8; k72*nsg_N7*N*c1;
  positive_strand_synthesis_1_1740: nsg_N8 + N => nsg_N8 + psg + N; k73*nsg_N8*N*c1;
  transcription_N_0_4740: nsg_N8 => nsg_N8 + mN; k74*nsg_N8*c1;
  transcription_P_0_9740: nsg_N8 => nsg_N8 + mN + mP; k75*nsg_N8*c1;
  transcription_M_0_14740: nsg_N8 => nsg_N8 + mM; k76*nsg_N8*c1;
  transcription_G_0_19740: nsg_N8 => nsg_N8 + mG; k77*nsg_N8*c1;
  transcription_L_0_24740: nsg_N8 => nsg_N8 + mL; k78*nsg_N8*c1;
  nsg_degradation_34740: nsg_N8 => ; k79*nsg_N8*c1;
  negative_strand_encapsidation_8: nsg_N8 + N => nsg_N9; k80*nsg_N8*N*c1;
  positive_strand_synthesis_1_1840: nsg_N9 + N => nsg_N9 + psg + N; k81*nsg_N9*N*c1;
  transcription_N_0_4840: nsg_N9 => nsg_N9 + mN; k82*nsg_N9*c1;
  transcription_P_0_9840: nsg_N9 => nsg_N9 + mN + mP; k83*nsg_N9*c1;
  transcription_M_0_14840: nsg_N9 => nsg_N9 + mM; k84*nsg_N9*c1;
  transcription_G_0_19840: nsg_N9 => nsg_N9 + mG; k85*nsg_N9*c1;
  transcription_L_0_24840: nsg_N9 => nsg_N9 + mL; k86*nsg_N9*c1;
  nsg_degradation_34840: nsg_N9 => ; k87*nsg_N9*c1;
  negative_strand_encapsidation_9: nsg_N9 + N => nsg_N10; k88*nsg_N9*N*c1;
  positive_strand_synthesis_1_1940: nsg_N10 + N => nsg_N10 + psg + N; k89*nsg_N10*N*c1;
  transcription_N_0_4940: nsg_N10 => nsg_N10 + mN; k90*nsg_N10*c1;
  transcription_P_0_9940: nsg_N10 => nsg_N10 + mN + mP; k91*nsg_N10*c1;
  transcription_M_0_14940: nsg_N10 => nsg_N10 + mM; k92*nsg_N10*c1;
  transcription_G_0_19940: nsg_N10 => nsg_N10 + mG; k93*nsg_N10*c1;
  transcription_L_0_24940: nsg_N10 => nsg_N10 + mL; k94*nsg_N10*c1;
  nsg_degradation_34940: nsg_N10 => ; k95*nsg_N10*c1;
  positive_strand_encapsidation: psg + N => psg_N1; k96*psg*N*c1;
  negative_strand_synthesis_0040: psg_N1 + N => psg_N1 + nsg + N; k97*psg_N1*N*c1;
  psg_degradation_40040: psg_N1 => ; k98*psg_N1*c1;
  positive_strand_encapsidation_1: psg_N1 + N => psg_N2; k99*psg_N1*N*c1;
  negative_strand_synthesis_0140: psg_N2 + N => psg_N2 + nsg + N; k100*psg_N2*N*c1;
  psg_degradation_40140: psg_N2 => ; k101*psg_N2*c1;
  positive_strand_encapsidation_2: psg_N2 + N => psg_N3; k102*psg_N2*N*c1;
  negative_strand_synthesis_0240: psg_N3 + N => psg_N3 + nsg + N; k103*psg_N3*N*c1;
  psg_degradation_40240: psg_N3 => ; k104*psg_N3*c1;
  positive_strand_encapsidation_3: psg_N3 + N => psg_N4; k105*psg_N3*N*c1;
  negative_strand_synthesis_0340: psg_N4 + N => psg_N4 + nsg + N; k106*psg_N4*N*c1;
  psg_degradation_40340: psg_N4 => ; k107*psg_N4*c1;
  positive_strand_encapsidation_4: psg_N4 + N => psg_N5; k108*psg_N4*N*c1;
  negative_strand_synthesis_0440: psg_N5 + N => psg_N5 + nsg + N; k109*psg_N5*N*c1;
  psg_degradation_40440: psg_N5 => ; k110*psg_N5*c1;
  positive_strand_encapsidation_5: psg_N5 + N => psg_N6; k111*psg_N5*N*c1;
  negative_strand_synthesis_0540: psg_N6 + N => psg_N6 + nsg + N; k112*psg_N6*N*c1;
  psg_degradation_40540: psg_N6 => ; k113*psg_N6*c1;
  positive_strand_encapsidation_6: psg_N6 + N => psg_N7; k114*psg_N6*N*c1;
  negative_strand_synthesis_0640: psg_N7 + N => psg_N7 + nsg + N; k115*psg_N7*N*c1;
  psg_degradation_40640: psg_N7 => ; k116*psg_N7*c1;
  positive_strand_encapsidation_7: psg_N7 + N => psg_N8; k117*psg_N7*N*c1;
  negative_strand_synthesis_0740: psg_N8 + N => psg_N8 + nsg + N; k118*psg_N8*N*c1;
  psg_degradation_40740: psg_N8 => ; k119*psg_N8*c1;
  positive_strand_encapsidation_8: psg_N8 + N => psg_N9; k120*psg_N8*N*c1;
  negative_strand_synthesis_0840: psg_N9 + N => psg_N9 + nsg + N; k121*psg_N9*N*c1;
  psg_degradation_40840: psg_N9 => ; k122*psg_N9*c1;
  positive_strand_encapsidation_9: psg_N9 + N => psg_N10; k123*psg_N9*N*c1;
  negative_strand_synthesis_0940: psg_N10 + N => psg_N10 + nsg + N; k124*psg_N10*N*c1;
  psg_degradation_40940: psg_N10 => ; k125*psg_N10*c1;
  negative_strand_p_binding: nsg_N10 + P => nsg_N10_P1; k126*nsg_N10*P*c1;
  positive_strand_synthesis_2_2040: nsg_N10_P1 + N => nsg_N10_P1 + psg + N; k127*nsg_N10_P1*N*c1;
  transcription_N_1_5040: nsg_N10_P1 => nsg_N10_P1 + mN; k128*nsg_N10_P1*c1;
  transcription_P_1_10040: nsg_N10_P1 => nsg_N10_P1 + mP; k129*nsg_N10_P1*c1;
  transcription_M_1_15040: nsg_N10_P1 => nsg_N10_P1 + mM; k130*nsg_N10_P1*c1;
  transcription_G_1_20040: nsg_N10_P1 => nsg_N10_P1 + mG; k131*nsg_N10_P1*c1;
  transcription_L_1_25040: nsg_N10_P1 => nsg_N10_P1 + mL; k132*nsg_N10_P1*c1;
  nsg_N10_degradation_35040: nsg_N10_P1 => ; k133*nsg_N10_P1*c1;
  negative_strand_p_binding_1: nsg_N10_P1 + P => nsg_N10_P2; k134*nsg_N10_P1*P*c1;
  positive_strand_synthesis_2_2140: nsg_N10_P2 + N => nsg_N10_P2 + psg + N; k135*nsg_N10_P2*N*c1;
  transcription_N_1_5140: nsg_N10_P2 => nsg_N10_P2 + mN; k136*nsg_N10_P2*c1;
  transcription_P_1_10140: nsg_N10_P2 => nsg_N10_P2 + mP; k137*nsg_N10_P2*c1;
  transcription_M_1_15140: nsg_N10_P2 => nsg_N10_P2 + mM; k138*nsg_N10_P2*c1;
  transcription_G_1_20140: nsg_N10_P2 => nsg_N10_P2 + mG; k139*nsg_N10_P2*c1;
  transcription_L_1_25140: nsg_N10_P2 => nsg_N10_P2 + mL; k140*nsg_N10_P2*c1;
  nsg_N10_degradation_35140: nsg_N10_P2 => ; k141*nsg_N10_P2*c1;
  negative_strand_p_binding_2: nsg_N10_P2 + P => nsg_N10_P3; k142*nsg_N10_P2*P*c1;
  positive_strand_synthesis_2_2240: nsg_N10_P3 + N => nsg_N10_P3 + psg + N; k143*nsg_N10_P3*N*c1;
  transcription_N_1_5240: nsg_N10_P3 => nsg_N10_P3 + mN; k144*nsg_N10_P3*c1;
  transcription_P_1_10240: nsg_N10_P3 => nsg_N10_P3 + mP; k145*nsg_N10_P3*c1;
  transcription_M_1_15240: nsg_N10_P3 => nsg_N10_P3 + mM; k146*nsg_N10_P3*c1;
  transcription_G_1_20240: nsg_N10_P3 => nsg_N10_P3 + mG; k147*nsg_N10_P3*c1;
  transcription_L_1_25240: nsg_N10_P3 => nsg_N10_P3 + mL; k148*nsg_N10_P3*c1;
  nsg_N10_degradation_35240: nsg_N10_P3 => ; k149*nsg_N10_P3*c1;
  negative_strand_p_binding_3: nsg_N10_P3 + P => nsg_N10_P4; k150*nsg_N10_P3*P*c1;
  positive_strand_synthesis_2_2340: nsg_N10_P4 + N => nsg_N10_P4 + psg + N; k151*nsg_N10_P4*N*c1;
  transcription_N_1_5340: nsg_N10_P4 => nsg_N10_P4 + mN; k152*nsg_N10_P4*c1;
  transcription_P_1_10340: nsg_N10_P4 => nsg_N10_P4 + mP; k153*nsg_N10_P4*c1;
  transcription_M_1_15340: nsg_N10_P4 => nsg_N10_P4 + mM; k154*nsg_N10_P4*c1;
  transcription_G_1_20340: nsg_N10_P4 => nsg_N10_P4 + mG; k155*nsg_N10_P4*c1;
  transcription_L_1_25340: nsg_N10_P4 => nsg_N10_P4 + mL; k156*nsg_N10_P4*c1;
  nsg_N10_degradation_35340: nsg_N10_P4 => ; k157*nsg_N10_P4*c1;
  negative_strand_p_binding_4: nsg_N10_P4 + P => nsg_N10_P5; k158*nsg_N10_P4*P*c1;
  positive_strand_synthesis_2_2440: nsg_N10_P5 + N => nsg_N10_P5 + psg + N; k159*nsg_N10_P5*N*c1;
  transcription_N_1_5440: nsg_N10_P5 => nsg_N10_P5 + mN; k160*nsg_N10_P5*c1;
  transcription_P_1_10440: nsg_N10_P5 => nsg_N10_P5 + mP; k161*nsg_N10_P5*c1;
  transcription_M_1_15440: nsg_N10_P5 => nsg_N10_P5 + mM; k162*nsg_N10_P5*c1;
  transcription_G_1_20440: nsg_N10_P5 => nsg_N10_P5 + mG; k163*nsg_N10_P5*c1;
  transcription_L_1_25440: nsg_N10_P5 => nsg_N10_P5 + mL; k164*nsg_N10_P5*c1;
  nsg_N10_degradation_35440: nsg_N10_P5 => ; k165*nsg_N10_P5*c1;
  negative_strand_p_binding_5: nsg_N10_P5 + P => nsg_N10_P6; k166*nsg_N10_P5*P*c1;
  positive_strand_synthesis_2_2540: nsg_N10_P6 + N => nsg_N10_P6 + psg + N; k167*nsg_N10_P6*N*c1;
  transcription_N_1_5540: nsg_N10_P6 => nsg_N10_P6 + mN; k168*nsg_N10_P6*c1;
  transcription_P_1_10540: nsg_N10_P6 => nsg_N10_P6 + mP; k169*nsg_N10_P6*c1;
  transcription_M_1_15540: nsg_N10_P6 => nsg_N10_P6 + mM; k170*nsg_N10_P6*c1;
  transcription_G_1_20540: nsg_N10_P6 => nsg_N10_P6 + mG; k171*nsg_N10_P6*c1;
  transcription_L_1_25540: nsg_N10_P6 => nsg_N10_P6 + mL; k172*nsg_N10_P6*c1;
  nsg_N10_degradation_35540: nsg_N10_P6 => ; k173*nsg_N10_P6*c1;
  negative_strand_p_binding_6: nsg_N10_P6 + P => nsg_N10_P7; k174*nsg_N10_P6*P*c1;
  positive_strand_synthesis_2_2640: nsg_N10_P7 + N => nsg_N10_P7 + psg + N; k175*nsg_N10_P7*N*c1;
  transcription_N_1_5640: nsg_N10_P7 => nsg_N10_P7 + mN; k176*nsg_N10_P7*c1;
  transcription_P_1_10640: nsg_N10_P7 => nsg_N10_P7 + mP; k177*nsg_N10_P7*c1;
  transcription_M_1_15640: nsg_N10_P7 => nsg_N10_P7 + mM; k178*nsg_N10_P7*c1;
  transcription_G_1_20640: nsg_N10_P7 => nsg_N10_P7 + mG; k179*nsg_N10_P7*c1;
  transcription_L_1_25640: nsg_N10_P7 => nsg_N10_P7 + mL; k180*nsg_N10_P7*c1;
  nsg_N10_degradation_35640: nsg_N10_P7 => ; k181*nsg_N10_P7*c1;
  negative_strand_p_binding_7: nsg_N10_P7 + P => nsg_N10_P8; k182*nsg_N10_P7*P*c1;
  positive_strand_synthesis_2_2740: nsg_N10_P8 + N => nsg_N10_P8 + psg + N; k183*nsg_N10_P8*N*c1;
  transcription_N_1_5740: nsg_N10_P8 => nsg_N10_P8 + mN; k184*nsg_N10_P8*c1;
  transcription_P_1_10740: nsg_N10_P8 => nsg_N10_P8 + mP; k185*nsg_N10_P8*c1;
  transcription_M_1_15740: nsg_N10_P8 => nsg_N10_P8 + mM; k186*nsg_N10_P8*c1;
  transcription_G_1_20740: nsg_N10_P8 => nsg_N10_P8 + mG; k187*nsg_N10_P8*c1;
  transcription_L_1_25740: nsg_N10_P8 => nsg_N10_P8 + mL; k188*nsg_N10_P8*c1;
  nsg_N10_degradation_35740: nsg_N10_P8 => ; k189*nsg_N10_P8*c1;
  negative_strand_p_binding_8: nsg_N10_P8 + P => nsg_N10_P9; k190*nsg_N10_P8*P*c1;
  positive_strand_synthesis_2_2840: nsg_N10_P9 + N => nsg_N10_P9 + psg + N; k191*nsg_N10_P9*N*c1;
  transcription_N_1_5840: nsg_N10_P9 => nsg_N10_P9 + mN; k192*nsg_N10_P9*c1;
  transcription_P_1_10840: nsg_N10_P9 => nsg_N10_P9 + mP; k193*nsg_N10_P9*c1;
  transcription_M_1_15840: nsg_N10_P9 => nsg_N10_P9 + mM; k194*nsg_N10_P9*c1;
  transcription_G_1_20840: nsg_N10_P9 => nsg_N10_P9 + mG; k195*nsg_N10_P9*c1;
  transcription_L_1_25840: nsg_N10_P9 => nsg_N10_P9 + mL; k196*nsg_N10_P9*c1;
  nsg_N10_degradation_35840: nsg_N10_P9 => ; k197*nsg_N10_P9*c1;
  negative_strand_p_binding_9: nsg_N10_P9 + P => nsg_N10_P10; k198*nsg_N10_P9*P*c1;
  positive_strand_synthesis_2_2940: nsg_N10_P10 + N => nsg_N10_P10 + psg + N; k199*nsg_N10_P10*N*c1;
  transcription_N_1_5940: nsg_N10_P10 => nsg_N10_P10 + mN; k200*nsg_N10_P10*c1;
  transcription_P_1_10940: nsg_N10_P10 => nsg_N10_P10 + mP; k201*nsg_N10_P10*c1;
  transcription_M_1_15940: nsg_N10_P10 => nsg_N10_P10 + mM; k202*nsg_N10_P10*c1;
  transcription_G_1_20940: nsg_N10_P10 => nsg_N10_P10 + mG; k203*nsg_N10_P10*c1;
  transcription_L_1_25940: nsg_N10_P10 => nsg_N10_P10 + mL; k204*nsg_N10_P10*c1;
  nsg_N10_degradation_35940: nsg_N10_P10 => ; k205*nsg_N10_P10*c1;
  negative_strand_l_binding: nsg_N10_P10 + L => nsg_N10_P10_L1; k206*nsg_N10_P10*L*c1;
  positive_strand_synthesis_3_3040: nsg_N10_P10_L1 + N => nsg_N10_P10_L1 + psg + N; k207*nsg_N10_P10_L1*N*c1;
  transcription_N_2_6040: nsg_N10_P10_L1 => nsg_N10_P10_L1 + mN; k208*nsg_N10_P10_L1*c1;
  transcription_P_2_11040: nsg_N10_P10_L1 => nsg_N10_P10_L1 + mP; k209*nsg_N10_P10_L1*c1;
  transcription_M_2_16040: nsg_N10_P10_L1 => nsg_N10_P10_L1 + mM; k210*nsg_N10_P10_L1*c1;
  transcription_G_2_21040: nsg_N10_P10_L1 => nsg_N10_P10_L1 + mG; k211*nsg_N10_P10_L1*c1;
  transcription_L_2_26040: nsg_N10_P10_L1 => nsg_N10_P10_L1 + mL; k212*nsg_N10_P10_L1*c1;
  nsg_N10_P10_degradation_36040: nsg_N10_P10_L1 => ; k213*nsg_N10_P10_L1*c1;
  negative_strand_l_binding_1: nsg_N10_P10_L1 + L => nsg_N10_P10_L2; k214*nsg_N10_P10_L1*L*c1;
  positive_strand_synthesis_3_3140: nsg_N10_P10_L2 + N => nsg_N10_P10_L2 + psg + N; k215*nsg_N10_P10_L2*N*c1;
  transcription_N_2_6140: nsg_N10_P10_L2 => nsg_N10_P10_L2 + mN; k216*nsg_N10_P10_L2*c1;
  transcription_P_2_11140: nsg_N10_P10_L2 => nsg_N10_P10_L2 + mP; k217*nsg_N10_P10_L2*c1;
  transcription_M_2_16140: nsg_N10_P10_L2 => nsg_N10_P10_L2 + mM; k218*nsg_N10_P10_L2*c1;
  transcription_G_2_21140: nsg_N10_P10_L2 => nsg_N10_P10_L2 + mG; k219*nsg_N10_P10_L2*c1;
  transcription_L_2_26140: nsg_N10_P10_L2 => nsg_N10_P10_L2 + mL; k220*nsg_N10_P10_L2*c1;
  nsg_N10_P10_degradation_36140: nsg_N10_P10_L2 => ; k221*nsg_N10_P10_L2*c1;
  negative_strand_l_binding_2: nsg_N10_P10_L2 + L => nsg_N10_P10_L3; k222*nsg_N10_P10_L2*L*c1;
  positive_strand_synthesis_3_3240: nsg_N10_P10_L3 + N => nsg_N10_P10_L3 + psg + N; k223*nsg_N10_P10_L3*N*c1;
  transcription_N_2_6240: nsg_N10_P10_L3 => nsg_N10_P10_L3 + mN; k224*nsg_N10_P10_L3*c1;
  transcription_P_2_11240: nsg_N10_P10_L3 => nsg_N10_P10_L3 + mP; k225*nsg_N10_P10_L3*c1;
  transcription_M_2_16240: nsg_N10_P10_L3 => nsg_N10_P10_L3 + mM; k226*nsg_N10_P10_L3*c1;
  transcription_G_2_21240: nsg_N10_P10_L3 => nsg_N10_P10_L3 + mG; k227*nsg_N10_P10_L3*c1;
  transcription_L_2_26240: nsg_N10_P10_L3 => nsg_N10_P10_L3 + mL; k228*nsg_N10_P10_L3*c1;
  nsg_N10_P10_degradation_36240: nsg_N10_P10_L3 => ; k229*nsg_N10_P10_L3*c1;
  negative_strand_l_binding_3: nsg_N10_P10_L3 + L => nsg_N10_P10_L4; k230*nsg_N10_P10_L3*L*c1;
  positive_strand_synthesis_3_3340: nsg_N10_P10_L4 + N => nsg_N10_P10_L4 + psg + N; k231*nsg_N10_P10_L4*N*c1;
  transcription_N_2_6340: nsg_N10_P10_L4 => nsg_N10_P10_L4 + mN; k232*nsg_N10_P10_L4*c1;
  transcription_P_2_11340: nsg_N10_P10_L4 => nsg_N10_P10_L4 + mP; k233*nsg_N10_P10_L4*c1;
  transcription_M_2_16340: nsg_N10_P10_L4 => nsg_N10_P10_L4 + mM; k234*nsg_N10_P10_L4*c1;
  transcription_G_2_21340: nsg_N10_P10_L4 => nsg_N10_P10_L4 + mG; k235*nsg_N10_P10_L4*c1;
  transcription_L_2_26340: nsg_N10_P10_L4 => nsg_N10_P10_L4 + mL; k236*nsg_N10_P10_L4*c1;
  nsg_N10_P10_degradation_36340: nsg_N10_P10_L4 => ; k237*nsg_N10_P10_L4*c1;
  negative_strand_l_binding_4: nsg_N10_P10_L4 + L => nsg_N10_P10_L5; k238*nsg_N10_P10_L4*L*c1;
  positive_strand_synthesis_3_3440: nsg_N10_P10_L5 + N => nsg_N10_P10_L5 + psg + N; k239*nsg_N10_P10_L5*N*c1;
  transcription_N_2_6440: nsg_N10_P10_L5 => nsg_N10_P10_L5 + mN; k240*nsg_N10_P10_L5*c1;
  transcription_P_2_11440: nsg_N10_P10_L5 => nsg_N10_P10_L5 + mP; k241*nsg_N10_P10_L5*c1;
  transcription_M_2_16440: nsg_N10_P10_L5 => nsg_N10_P10_L5 + mM; k242*nsg_N10_P10_L5*c1;
  transcription_G_2_21440: nsg_N10_P10_L5 => nsg_N10_P10_L5 + mG; k243*nsg_N10_P10_L5*c1;
  transcription_L_2_26440: nsg_N10_P10_L5 => nsg_N10_P10_L5 + mL; k244*nsg_N10_P10_L5*c1;
  nsg_N10_P10_degradation_36440: nsg_N10_P10_L5 => ; k245*nsg_N10_P10_L5*c1;
  negative_strand_l_binding_5: nsg_N10_P10_L5 + L => nsg_N10_P10_L6; k246*nsg_N10_P10_L5*L*c1;
  positive_strand_synthesis_3_3540: nsg_N10_P10_L6 + N => nsg_N10_P10_L6 + psg + N; k247*nsg_N10_P10_L6*N*c1;
  transcription_N_2_6540: nsg_N10_P10_L6 => nsg_N10_P10_L6 + mN; k248*nsg_N10_P10_L6*c1;
  transcription_P_2_11540: nsg_N10_P10_L6 => nsg_N10_P10_L6 + mP; k249*nsg_N10_P10_L6*c1;
  transcription_M_2_16540: nsg_N10_P10_L6 => nsg_N10_P10_L6 + mM; k250*nsg_N10_P10_L6*c1;
  transcription_G_2_21540: nsg_N10_P10_L6 => nsg_N10_P10_L6 + mG; k251*nsg_N10_P10_L6*c1;
  transcription_L_2_26540: nsg_N10_P10_L6 => nsg_N10_P10_L6 + mL; k252*nsg_N10_P10_L6*c1;
  nsg_N10_P10_degradation_36540: nsg_N10_P10_L6 => ; k253*nsg_N10_P10_L6*c1;
  negative_strand_l_binding_6: nsg_N10_P10_L6 + L => nsg_N10_P10_L7; k254*nsg_N10_P10_L6*L*c1;
  positive_strand_synthesis_3_3640: nsg_N10_P10_L7 + N => nsg_N10_P10_L7 + psg + N; k255*nsg_N10_P10_L7*N*c1;
  transcription_N_2_6640: nsg_N10_P10_L7 => nsg_N10_P10_L7 + mN; k256*nsg_N10_P10_L7*c1;
  transcription_P_2_11640: nsg_N10_P10_L7 => nsg_N10_P10_L7 + mP; k257*nsg_N10_P10_L7*c1;
  transcription_M_2_16640: nsg_N10_P10_L7 => nsg_N10_P10_L7 + mM; k258*nsg_N10_P10_L7*c1;
  transcription_G_2_21640: nsg_N10_P10_L7 => nsg_N10_P10_L7 + mG; k259*nsg_N10_P10_L7*c1;
  transcription_L_2_26640: nsg_N10_P10_L7 => nsg_N10_P10_L7 + mL; k260*nsg_N10_P10_L7*c1;
  nsg_N10_P10_degradation_36640: nsg_N10_P10_L7 => ; k261*nsg_N10_P10_L7*c1;
  negative_strand_l_binding_7: nsg_N10_P10_L7 + L => nsg_N10_P10_L8; k262*nsg_N10_P10_L7*L*c1;
  positive_strand_synthesis_3_3740: nsg_N10_P10_L8 + N => nsg_N10_P10_L8 + psg + N; k263*nsg_N10_P10_L8*N*c1;
  transcription_N_2_6740: nsg_N10_P10_L8 => nsg_N10_P10_L8 + mN; k264*nsg_N10_P10_L8*c1;
  transcription_P_2_11740: nsg_N10_P10_L8 => nsg_N10_P10_L8 + mP; k265*nsg_N10_P10_L8*c1;
  transcription_M_2_16740: nsg_N10_P10_L8 => nsg_N10_P10_L8 + mM; k266*nsg_N10_P10_L8*c1;
  transcription_G_2_21740: nsg_N10_P10_L8 => nsg_N10_P10_L8 + mG; k267*nsg_N10_P10_L8*c1;
  transcription_L_2_26740: nsg_N10_P10_L8 => nsg_N10_P10_L8 + mL; k268*nsg_N10_P10_L8*c1;
  nsg_N10_P10_degradation_36740: nsg_N10_P10_L8 => ; k269*nsg_N10_P10_L8*c1;
  negative_strand_l_binding_8: nsg_N10_P10_L8 + L => nsg_N10_P10_L9; k270*nsg_N10_P10_L8*L*c1;
  positive_strand_synthesis_3_3840: nsg_N10_P10_L9 + N => nsg_N10_P10_L9 + psg + N; k271*nsg_N10_P10_L9*N*c1;
  transcription_N_2_6840: nsg_N10_P10_L9 => nsg_N10_P10_L9 + mN; k272*nsg_N10_P10_L9*c1;
  transcription_P_2_11840: nsg_N10_P10_L9 => nsg_N10_P10_L9 + mP; k273*nsg_N10_P10_L9*c1;
  transcription_M_2_16840: nsg_N10_P10_L9 => nsg_N10_P10_L9 + mM; k274*nsg_N10_P10_L9*c1;
  transcription_G_2_21840: nsg_N10_P10_L9 => nsg_N10_P10_L9 + mG; k275*nsg_N10_P10_L9*c1;
  transcription_L_2_26840: nsg_N10_P10_L9 => nsg_N10_P10_L9 + mL; k276*nsg_N10_P10_L9*c1;
  nsg_N10_P10_degradation_36840: nsg_N10_P10_L9 => ; k277*nsg_N10_P10_L9*c1;
  negative_strand_l_binding_9: nsg_N10_P10_L9 + L => nsg_N10_P10_L10; k278*nsg_N10_P10_L9*L*c1;
  positive_strand_synthesis_3_3940: nsg_N10_P10_L10 + N => nsg_N10_P10_L10 + psg + N; k279*nsg_N10_P10_L10*N*c1;
  transcription_N_2_6940: nsg_N10_P10_L10 => nsg_N10_P10_L10 + mN; k280*nsg_N10_P10_L10*c1;
  transcription_P_2_11940: nsg_N10_P10_L10 => nsg_N10_P10_L10 + mP; k281*nsg_N10_P10_L10*c1;
  transcription_M_2_16940: nsg_N10_P10_L10 => nsg_N10_P10_L10 + mM; k282*nsg_N10_P10_L10*c1;
  transcription_G_2_21940: nsg_N10_P10_L10 => nsg_N10_P10_L10 + mG; k283*nsg_N10_P10_L10*c1;
  transcription_L_2_26940: nsg_N10_P10_L10 => nsg_N10_P10_L10 + mL; k284*nsg_N10_P10_L10*c1;
  nsg_N10_P10_degradation_36940: nsg_N10_P10_L10 => ; k285*nsg_N10_P10_L10*c1;
  transcriptional_silencing: nsg_N10_P10_L10 + M => nsg_N10_P10_L10_M1; k286*nsg_N10_P10_L10*M*c1;
  nsg_N10_P10_L10_degradation_37040: nsg_N10_P10_L10_M1 => ; k287*nsg_N10_P10_L10_M1*c1;
  transcriptional_silencing_1: nsg_N10_P10_L10_M1 + M => nsg_N10_P10_L10_M2; k288*nsg_N10_P10_L10_M1*M*c1;
  nsg_N10_P10_L10_degradation_37140: nsg_N10_P10_L10_M2 => ; k289*nsg_N10_P10_L10_M2*c1;
  transcriptional_silencing_2: nsg_N10_P10_L10_M2 + M => nsg_N10_P10_L10_M3; k290*nsg_N10_P10_L10_M2*M*c1;
  nsg_N10_P10_L10_degradation_37240: nsg_N10_P10_L10_M3 => ; k291*nsg_N10_P10_L10_M3*c1;
  transcriptional_silencing_3: nsg_N10_P10_L10_M3 + M => nsg_N10_P10_L10_M4; k292*nsg_N10_P10_L10_M3*M*c1;
  nsg_N10_P10_L10_degradation_37340: nsg_N10_P10_L10_M4 => ; k293*nsg_N10_P10_L10_M4*c1;
  transcriptional_silencing_4: nsg_N10_P10_L10_M4 + M => nsg_N10_P10_L10_M5; k294*nsg_N10_P10_L10_M4*M*c1;
  nsg_N10_P10_L10_degradation_37440: nsg_N10_P10_L10_M5 => ; k295*nsg_N10_P10_L10_M5*c1;
  transcriptional_silencing_5: nsg_N10_P10_L10_M5 + M => nsg_N10_P10_L10_M6; k296*nsg_N10_P10_L10_M5*M*c1;
  nsg_N10_P10_L10_degradation_37540: nsg_N10_P10_L10_M6 => ; k297*nsg_N10_P10_L10_M6*c1;
  transcriptional_silencing_6: nsg_N10_P10_L10_M6 + M => nsg_N10_P10_L10_M7; k298*nsg_N10_P10_L10_M6*M*c1;
  nsg_N10_P10_L10_degradation_37640: nsg_N10_P10_L10_M7 => ; k299*nsg_N10_P10_L10_M7*c1;
  transcriptional_silencing_7: nsg_N10_P10_L10_M7 + M => nsg_N10_P10_L10_M8; k300*nsg_N10_P10_L10_M7*M*c1;
  nsg_N10_P10_L10_degradation_37740: nsg_N10_P10_L10_M8 => ; k301*nsg_N10_P10_L10_M8*c1;
  transcriptional_silencing_8: nsg_N10_P10_L10_M8 + M => nsg_N10_P10_L10_M9; k302*nsg_N10_P10_L10_M8*M*c1;
  nsg_N10_P10_L10_degradation_37840: nsg_N10_P10_L10_M9 => ; k303*nsg_N10_P10_L10_M9*c1;
  transcriptional_silencing_9: nsg_N10_P10_L10_M9 + M => nsg_N10_P10_L10_M10; k304*nsg_N10_P10_L10_M9*M*c1;
  nsg_N10_P10_L10_degradation_37940: nsg_N10_P10_L10_M10 => ; k305*nsg_N10_P10_L10_M10*c1;
  Virion_Assembly: nsg_N10_P10_L10_M10 + G => nsg_N10_P10_L10_M10_G1; k306*nsg_N10_P10_L10_M10*G*c1;
  nsg_N10_P10_L10_M10_degradation_38040: nsg_N10_P10_L10_M10_G1 => ; k307*nsg_N10_P10_L10_M10_G1*c1;
  Virion_Assembly_1: nsg_N10_P10_L10_M10_G1 + G => nsg_N10_P10_L10_M10_G2; k308*nsg_N10_P10_L10_M10_G1*G*c1;
  nsg_N10_P10_L10_M10_degradation_38140: nsg_N10_P10_L10_M10_G2 => ; k309*nsg_N10_P10_L10_M10_G2*c1;
  Virion_Assembly_2: nsg_N10_P10_L10_M10_G2 + G => nsg_N10_P10_L10_M10_G3; k310*nsg_N10_P10_L10_M10_G2*G*c1;
  nsg_N10_P10_L10_M10_degradation_38240: nsg_N10_P10_L10_M10_G3 => ; k311*nsg_N10_P10_L10_M10_G3*c1;
  Virion_Assembly_3: nsg_N10_P10_L10_M10_G3 + G => nsg_N10_P10_L10_M10_G4; k312*nsg_N10_P10_L10_M10_G3*G*c1;
  nsg_N10_P10_L10_M10_degradation_38340: nsg_N10_P10_L10_M10_G4 => ; k313*nsg_N10_P10_L10_M10_G4*c1;
  Virion_Assembly_4: nsg_N10_P10_L10_M10_G4 + G => nsg_N10_P10_L10_M10_G5; k314*nsg_N10_P10_L10_M10_G4*G*c1;
  nsg_N10_P10_L10_M10_degradation_38440: nsg_N10_P10_L10_M10_G5 => ; k315*nsg_N10_P10_L10_M10_G5*c1;
  Virion_Assembly_5: nsg_N10_P10_L10_M10_G5 + G => nsg_N10_P10_L10_M10_G6; k316*nsg_N10_P10_L10_M10_G5*G*c1;
  nsg_N10_P10_L10_M10_degradation_38540: nsg_N10_P10_L10_M10_G6 => ; k317*nsg_N10_P10_L10_M10_G6*c1;
  Virion_Assembly_6: nsg_N10_P10_L10_M10_G6 + G => nsg_N10_P10_L10_M10_G7; k318*nsg_N10_P10_L10_M10_G6*G*c1;
  nsg_N10_P10_L10_M10_degradation_38640: nsg_N10_P10_L10_M10_G7 => ; k319*nsg_N10_P10_L10_M10_G7*c1;
  Virion_Assembly_7: nsg_N10_P10_L10_M10_G7 + G => nsg_N10_P10_L10_M10_G8; k320*nsg_N10_P10_L10_M10_G7*G*c1;
  nsg_N10_P10_L10_M10_degradation_38740: nsg_N10_P10_L10_M10_G8 => ; k321*nsg_N10_P10_L10_M10_G8*c1;
  Virion_Assembly_8: nsg_N10_P10_L10_M10_G8 + G => nsg_N10_P10_L10_M10_G9; k322*nsg_N10_P10_L10_M10_G8*G*c1;
  nsg_N10_P10_L10_M10_degradation_38840: nsg_N10_P10_L10_M10_G9 => ; k323*nsg_N10_P10_L10_M10_G9*c1;
  Virion_Assembly_9: nsg_N10_P10_L10_M10_G9 + G => nsg_N10_P10_L10_M10_G10; k324*nsg_N10_P10_L10_M10_G9*G*c1;
  nsg_N10_P10_L10_M10_degradation_38940: nsg_N10_P10_L10_M10_G10 => ; k325*nsg_N10_P10_L10_M10_G10*c1;

  // Unit definitions:
  unit per_second = 1 / second;
end
