// SBML level 3 version 1

model main()
  // model units - substance: item, time: second, extent: item

  // Compartments:
  compartment c1 = 1 litre;

  // Species:
  species nsg in c1 = 0;  // substance in mole
  species N in c1 = 0;  // substance in mole
  species nsg_NPL in c1 = 0;  // substance in mole
  species nsg_NP in c1 = 0;  // substance in mole
  species nsg_N in c1 = 1/c1;  // substance in mole
  species psg in c1 = 0;  // substance in mole
  species psg_N in c1 = 0;  // substance in mole
  species L in c1 = 1/c1;  // substance in mole
  species P in c1 = 1/c1;  // substance in mole
  species M in c1 = 0;  // substance in mole
  species G in c1 = 1/c1;  // substance in mole
  species mL in c1 = 0;  // substance in mole
  species mM in c1 = 0;  // substance in mole
  species mP in c1 = 0;  // substance in mole
  species mG in c1 = 0;  // substance in mole
  species mN in c1 = 0;  // substance in mole
  species nsg_NPLM in c1 = 0;  // substance in mole
  species nsg_NPLMG in c1 = 0;  // substance in mole
  species V in c1 = 0;  // substance in mole

  // Parameters:
  k0 = 0.0461 per_second;
  k1 = 0.0461 per_second;
  k2 = 0.015618206 per_second;
  k3 = 0.015618206 per_second;
  k4 = 0.00031236412 per_second;
  k5 = 0.00031236412 per_second;
  k6 = 0.00031236412 per_second;
  k7 = 0.00031236412 per_second;
  k8 = 0.0461 per_second;
  k9 = 0.0461 per_second;
  k10 = 0.00160781533 per_second;
  k11 = 0.00160781533 per_second;
  k12 = 0.00160781533 per_second;
  k13 = 0.00160781533 per_second;
  k14 = 6.00159e-5 per_second;
  k15 = 2.211598e-11 per_second;
  k16 = 0.001125471 per_second;
  k17 = 0.001125471 per_second;
  k18 = 0.001125471 per_second;
  k19 = 0.001125471 per_second;
  k20 = 0.0001620172 per_second;
  k21 = 6.446974e-12 per_second;
  k22 = 0.0007878297 per_second;
  k23 = 0.0007878297 per_second;
  k24 = 0.0007878297 per_second;
  k25 = 0.0007878297 per_second;
  k26 = 4.134721e-5 per_second;
  k27 = 4.498729e-11 per_second;
  k28 = 0.0461 per_second;
  k29 = 0.000551481 per_second;
  k30 = 0.000551481 per_second;
  k31 = 0.000551481 per_second;
  k32 = 0.000551481 per_second;
  k33 = 6.26556e-5 per_second;
  k34 = 3.925552e-11 per_second;
  k35 = 0.0461 per_second;
  k36 = 5.51481e-5 per_second;
  k37 = 5.51481e-5 per_second;
  k38 = 5.51481e-5 per_second;
  k39 = 5.51481e-5 per_second;
  k40 = 0.00151 per_second;
  k41 = 1.1e-8 per_second;
  k42 = 0.00019 per_second;
  k43 = 0.00019 per_second;
  k44 = 0.00019 per_second;
  k45 = 0.00019 per_second;
  k46 = 0.00019 per_second;
  k47 = 1.9e-5 per_second;
  k48 = 1.9e-5 per_second;
  k49 = 1.9e-5 per_second;
  k50 = 1.9e-5 per_second;
  k51 = 1.9e-5 per_second;
  k52 = 1.9e-5 per_second;
  k53 = 0.0461 per_second;
  k54 = 1.9e-5 per_second;
  k55 = 1.9e-5 per_second;

  // Reactions:
  negative_strand_encapsidation: nsg + N => nsg_N; k0*nsg*N*c1;
  positive_strand_encapsidation: psg + N => psg_N; k1*psg*N*c1;
  negative_strand_synthesis: psg + N => psg + nsg + N; k2*psg*N*c1;
  negative_strand_synthesis_1: psg_N + N => psg_N + nsg + N; k3*psg_N*N*c1;
  positive_strand_synthesis_1: nsg + N => nsg + psg + N; k4*nsg*N*c1;
  positive_strand_synthesis_2: nsg_N + N => nsg_N + psg + N; k5*nsg_N*N*c1;
  positive_strand_synthesis_3: nsg_NP + N => nsg_NP + psg + N; k6*nsg_NP*N*c1;
  positive_strand_synthesis_4: nsg_NPL + N => nsg_NPL + psg + N; k7*nsg_NPL*N*c1;
  negative_strand_p_binding: nsg_N + P => nsg_NP; k8*nsg_N*P*c1;
  negative_strand_l_binding: nsg_NP + L => nsg_NPL; k9*nsg_NP*L*c1;
  transcription_N_0: nsg => nsg + mN; k10*nsg*c1;
  transcription_N_1: nsg_N => nsg_N + mN; k11*nsg_N*c1;
  transcription_N_2: nsg_NP => nsg_NP + mN; k12*nsg_NP*c1;
  transcription_N_3: nsg_NPL => nsg_NPL + mN; k13*nsg_NPL*c1;
  translation_N: mN => mN + N; k14*mN*c1;
  N_degradation: N => ; k15*N*c1;
  transcription_P_0: nsg => nsg + mP; k16*nsg*c1;
  transcription_P_1: nsg_N => nsg_N + mP; k17*nsg_N*c1;
  transcription_P_2: nsg_NP => nsg_NP + mP; k18*nsg_NP*c1;
  transcription_P_3: nsg_NPL => nsg_NPL + mP; k19*nsg_NPL*c1;
  translation_P: mP => mP + P; k20*mP*c1;
  P_degradation: P => ; k21*P*c1;
  transcription_M_0: nsg => nsg + mM; k22*nsg*c1;
  transcription_M_1: nsg_N => nsg_N + mM; k23*nsg_N*c1;
  transcription_M_2: nsg_NP => nsg_NP + mM; k24*nsg_NP*c1;
  transcription_M_3: nsg_NPL => nsg_NPL + mM; k25*nsg_NPL*c1;
  translation_M: mM => mM + M; k26*mM*c1;
  M_degradation: M => ; k27*M*c1;
  transcriptional_silencing: nsg_NPL + M => nsg_NPLM; k28*nsg_NPL*M*c1;
  transcription_G_0: nsg => nsg + mG; k29*nsg*c1;
  transcription_G_1: nsg_N => nsg_N + mG; k30*nsg_N*c1;
  transcription_G_2: nsg_NP => nsg_NP + mG; k31*nsg_NP*c1;
  transcription_G_3: nsg_NPL => nsg_NPL + mG; k32*nsg_NPL*c1;
  translation_G: mG => mG + G; k33*mG*c1;
  G_degradation: G => ; k34*G*c1;
  Virion_Assembly: nsg_NPLM + G => nsg_NPLMG; k35*nsg_NPLM*G*c1;
  transcription_L_0: nsg => nsg + mL; k36*nsg*c1;
  transcription_L_1: nsg_N => nsg_N + mL; k37*nsg_N*c1;
  transcription_L_2: nsg_NP => nsg_NP + mL; k38*nsg_NP*c1;
  transcription_L_3: nsg_NPL => nsg_NPL + mL; k39*nsg_NPL*c1;
  translation_L: mL => mL + L; k40*mL*c1;
  L_degradation: L => ; k41*L*c1;
  mN_degradation: mN => ; k42*mN*c1;
  mP_degradation: mP => ; k43*mP*c1;
  mM_degradation: mM => ; k44*mM*c1;
  mG_degradation: mG => ; k45*mG*c1;
  mL_degradation: mL => ; k46*mL*c1;
  nsg_degradation: nsg => ; k47*nsg*c1;
  nsg_N1258_degradation: nsg_N => ; k48*nsg_N*c1;
  nsg_N1258_P466_degradation: nsg_NP => ; k49*nsg_NP*c1;
  nsg_N1258_P466_L50_degradation: nsg_NPL => ; k50*nsg_NPL*c1;
  nsg_N1258_P466_L50_M1826_degradation: nsg_NPLM => ; k51*nsg_NPLM*c1;
  nsg_N1258_P466_L50_M1826_G1205_degradation: nsg_NPLMG => ; k52*nsg_NPLMG*c1;
  Virion_Budding: nsg_NPLMG => V; k53*nsg_NPLMG*c1;
  psg_degradation: psg => ; k54*psg*c1;
  psg_N_degradation: psg_N => ; k55*psg_N*c1;

  // Unit definitions:
  unit per_second = 1 / second;
end
